**
**   Structure: cantilever beam.
**   Test objective: frequency sensitivity w.r.t the geometry
**
*HEADING
Model: beam     Date: 10-Mar-1998
*NODE
     1,      0.000000,      0.000000,      0.000000
     2,      1.000000,      0.000000,      0.000000
     3,      1.000000,      1.000000,      0.000000
     4,      0.000000,      1.000000,      0.000000
     5,      0.000000,      0.000000,      8.000000
     6,      1.000000,      0.000000,      8.000000
     7,      1.000000,      1.000000,      8.000000
     8,      0.000000,      1.000000,      8.000000
     9,      0.250000,      0.000000,      0.000000
    10,      0.500000,      0.000000,      0.000000
    11,      0.750000,      0.000000,      0.000000
    12,      1.000000,      0.250000,      0.000000
    13,      1.000000,      0.500000,      0.000000
    14,      1.000000,      0.750000,      0.000000
    15,      0.750000,      1.000000,      0.000000
    16,      0.500000,      1.000000,      0.000000
    17,      0.250000,      1.000000,      0.000000
    18,      0.000000,      0.750000,      0.000000
    19,      0.000000,      0.500000,      0.000000
    20,      0.000000,      0.250000,      0.000000
    21,      0.250000,      0.000000,      8.000000
    22,      0.500000,      0.000000,      8.000000
    23,      0.750000,      0.000000,      8.000000
    24,      1.000000,      0.250000,      8.000000
    25,      1.000000,      0.500000,      8.000000
    26,      1.000000,      0.750000,      8.000000
    27,      0.750000,      1.000000,      8.000000
    28,      0.500000,      1.000000,      8.000000
    29,      0.250000,      1.000000,      8.000000
    30,      0.000000,      0.750000,      8.000000
    31,      0.000000,      0.500000,      8.000000
    32,      0.000000,      0.250000,      8.000000
    33,      1.000000,      0.000000,      0.500000
    34,      1.000000,      0.000000,      1.000000
    35,      1.000000,      0.000000,      1.500000
    36,      1.000000,      0.000000,      2.000000
    37,      1.000000,      0.000000,      2.500000
    38,      1.000000,      0.000000,      3.000000
    39,      1.000000,      0.000000,      3.500000
    40,      1.000000,      0.000000,      4.000000
    340,      1.000000,      0.000000,      4.000000
    41,      1.000000,      0.000000,      4.500000
    42,      1.000000,      0.000000,      5.000000
    43,      1.000000,      0.000000,      5.500000
    44,      1.000000,      0.000000,      6.000000
    45,      1.000000,      0.000000,      6.500000
    46,      1.000000,      0.000000,      7.000000
    47,      1.000000,      0.000000,      7.500000
    48,      0.000000,      0.000000,      7.500000
    49,      0.000000,      0.000000,      7.000000
    50,      0.000000,      0.000000,      6.500000
    51,      0.000000,      0.000000,      6.000000
    52,      0.000000,      0.000000,      5.500000
    53,      0.000000,      0.000000,      5.000000
    54,      0.000000,      0.000000,      4.500000
    55,      0.000000,      0.000000,      4.000000
    355,      0.000000,      0.000000,      4.000000
    56,      0.000000,      0.000000,      3.500000
    57,      0.000000,      0.000000,      3.000000
    58,      0.000000,      0.000000,      2.500000
    59,      0.000000,      0.000000,      2.000000
    60,      0.000000,      0.000000,      1.500000
    61,      0.000000,      0.000000,      1.000000
    62,      0.000000,      0.000000,      0.500000
    63,      1.000000,      1.000000,      0.500000
    64,      1.000000,      1.000000,      1.000000
    65,      1.000000,      1.000000,      1.500000
    66,      1.000000,      1.000000,      2.000000
    67,      1.000000,      1.000000,      2.500000
    68,      1.000000,      1.000000,      3.000000
    69,      1.000000,      1.000000,      3.500000
    70,      1.000000,      1.000000,      4.000000
    370,      1.000000,      1.000000,      4.000000
    71,      1.000000,      1.000000,      4.500000
    72,      1.000000,      1.000000,      5.000000
    73,      1.000000,      1.000000,      5.500000
    74,      1.000000,      1.000000,      6.000000
    75,      1.000000,      1.000000,      6.500000
    76,      1.000000,      1.000000,      7.000000
    77,      1.000000,      1.000000,      7.500000
    78,      0.000000,      1.000000,      0.500000
    79,      0.000000,      1.000000,      1.000000
    80,      0.000000,      1.000000,      1.500000
    81,      0.000000,      1.000000,      2.000000
    82,      0.000000,      1.000000,      2.500000
    83,      0.000000,      1.000000,      3.000000
    84,      0.000000,      1.000000,      3.500000
    85,      0.000000,      1.000000,      4.000000
    385,      0.000000,      1.000000,      4.000000
    86,      0.000000,      1.000000,      4.500000
    87,      0.000000,      1.000000,      5.000000
    88,      0.000000,      1.000000,      5.500000
    89,      0.000000,      1.000000,      6.000000
    90,      0.000000,      1.000000,      6.500000
    91,      0.000000,      1.000000,      7.000000
    92,      0.000000,      1.000000,      7.500000
    93,      0.500000,      0.250000,      0.000000
    94,      0.250000,      0.500000,      0.000000
    95,      0.500000,      0.500000,      0.000000
    96,      0.750000,      0.500000,      0.000000
    97,      0.500000,      0.750000,      0.000000
    98,      0.500000,      0.250000,      8.000000
    99,      0.250000,      0.500000,      8.000000
   100,      0.500000,      0.500000,      8.000000
   101,      0.750000,      0.500000,      8.000000
   102,      0.500000,      0.750000,      8.000000
   103,      0.500000,      0.000000,      0.500000
   104,      0.250000,      0.000000,      1.000000
   105,      0.500000,      0.000000,      1.000000
   106,      0.750000,      0.000000,      1.000000
   107,      0.500000,      0.000000,      1.500000
   108,      0.250000,      0.000000,      2.000000
   109,      0.500000,      0.000000,      2.000000
   110,      0.750000,      0.000000,      2.000000
   111,      0.500000,      0.000000,      2.500000
   112,      0.250000,      0.000000,      3.000000
   113,      0.500000,      0.000000,      3.000000
   114,      0.750000,      0.000000,      3.000000
   115,      0.500000,      0.000000,      3.500000
   116,      0.250000,      0.000000,      4.000000
   117,      0.500000,      0.000000,      4.000000
   417,      0.500000,      0.000000,      4.000000
   118,      0.750000,      0.000000,      4.000000
   119,      0.500000,      0.000000,      4.500000
   120,      0.250000,      0.000000,      5.000000
   121,      0.500000,      0.000000,      5.000000
   122,      0.750000,      0.000000,      5.000000
   123,      0.500000,      0.000000,      5.500000
   124,      0.250000,      0.000000,      6.000000
   125,      0.500000,      0.000000,      6.000000
   126,      0.750000,      0.000000,      6.000000
   127,      0.500000,      0.000000,      6.500000
   128,      0.250000,      0.000000,      7.000000
   129,      0.500000,      0.000000,      7.000000
   130,      0.750000,      0.000000,      7.000000
   131,      0.500000,      0.000000,      7.500000
   132,      1.000000,      0.500000,      0.500000
   133,      1.000000,      0.250000,      1.000000
   134,      1.000000,      0.500000,      1.000000
   135,      1.000000,      0.750000,      1.000000
   136,      1.000000,      0.500000,      1.500000
   137,      1.000000,      0.250000,      2.000000
   138,      1.000000,      0.500000,      2.000000
   139,      1.000000,      0.750000,      2.000000
   140,      1.000000,      0.500000,      2.500000
   141,      1.000000,      0.250000,      3.000000
   142,      1.000000,      0.500000,      3.000000
   143,      1.000000,      0.750000,      3.000000
   144,      1.000000,      0.500000,      3.500000
   145,      1.000000,      0.250000,      4.000000
   146,      1.000000,      0.500000,      4.000000
   446,      1.000000,      0.500000,      4.000000
   147,      1.000000,      0.750000,      4.000000
   148,      1.000000,      0.500000,      4.500000
   149,      1.000000,      0.250000,      5.000000
   150,      1.000000,      0.500000,      5.000000
   151,      1.000000,      0.750000,      5.000000
   152,      1.000000,      0.500000,      5.500000
   153,      1.000000,      0.250000,      6.000000
   154,      1.000000,      0.500000,      6.000000
   155,      1.000000,      0.750000,      6.000000
   156,      1.000000,      0.500000,      6.500000
   157,      1.000000,      0.250000,      7.000000
   158,      1.000000,      0.500000,      7.000000
   159,      1.000000,      0.750000,      7.000000
   160,      1.000000,      0.500000,      7.500000
   161,      0.500000,      1.000000,      0.500000
   162,      0.750000,      1.000000,      1.000000
   163,      0.500000,      1.000000,      1.000000
   164,      0.250000,      1.000000,      1.000000
   165,      0.500000,      1.000000,      1.500000
   166,      0.750000,      1.000000,      2.000000
   167,      0.500000,      1.000000,      2.000000
   168,      0.250000,      1.000000,      2.000000
   169,      0.500000,      1.000000,      2.500000
   170,      0.750000,      1.000000,      3.000000
   171,      0.500000,      1.000000,      3.000000
   172,      0.250000,      1.000000,      3.000000
   173,      0.500000,      1.000000,      3.500000
   174,      0.750000,      1.000000,      4.000000
   175,      0.500000,      1.000000,      4.000000
   475,      0.500000,      1.000000,      4.000000
   176,      0.250000,      1.000000,      4.000000
   177,      0.500000,      1.000000,      4.500000
   178,      0.750000,      1.000000,      5.000000
   179,      0.500000,      1.000000,      5.000000
   180,      0.250000,      1.000000,      5.000000
   181,      0.500000,      1.000000,      5.500000
   182,      0.750000,      1.000000,      6.000000
   183,      0.500000,      1.000000,      6.000000
   184,      0.250000,      1.000000,      6.000000
   185,      0.500000,      1.000000,      6.500000
   186,      0.750000,      1.000000,      7.000000
   187,      0.500000,      1.000000,      7.000000
   188,      0.250000,      1.000000,      7.000000
   189,      0.500000,      1.000000,      7.500000
   190,      0.000000,      0.500000,      0.500000
   191,      0.000000,      0.750000,      1.000000
   192,      0.000000,      0.500000,      1.000000
   193,      0.000000,      0.250000,      1.000000
   194,      0.000000,      0.500000,      1.500000
   195,      0.000000,      0.750000,      2.000000
   196,      0.000000,      0.500000,      2.000000
   197,      0.000000,      0.250000,      2.000000
   198,      0.000000,      0.500000,      2.500000
   199,      0.000000,      0.750000,      3.000000
   200,      0.000000,      0.500000,      3.000000
   201,      0.000000,      0.250000,      3.000000
   202,      0.000000,      0.500000,      3.500000
   203,      0.000000,      0.750000,      4.000000
   204,      0.000000,      0.500000,      4.000000
   504,      0.000000,      0.500000,      4.000000
   205,      0.000000,      0.250000,      4.000000
   206,      0.000000,      0.500000,      4.500000
   207,      0.000000,      0.750000,      5.000000
   208,      0.000000,      0.500000,      5.000000
   209,      0.000000,      0.250000,      5.000000
   210,      0.000000,      0.500000,      5.500000
   211,      0.000000,      0.750000,      6.000000
   212,      0.000000,      0.500000,      6.000000
   213,      0.000000,      0.250000,      6.000000
   214,      0.000000,      0.500000,      6.500000
   215,      0.000000,      0.750000,      7.000000
   216,      0.000000,      0.500000,      7.000000
   217,      0.000000,      0.250000,      7.000000
   218,      0.000000,      0.500000,      7.500000
   219,      0.500000,      0.500000,      0.500000
   220,      0.500000,      0.250000,      1.000000
   221,      0.250000,      0.500000,      1.000000
   222,      0.500000,      0.500000,      1.000000
   223,      0.750000,      0.500000,      1.000000
   224,      0.500000,      0.750000,      1.000000
   225,      0.500000,      0.500000,      1.500000
   226,      0.500000,      0.250000,      2.000000
   227,      0.250000,      0.500000,      2.000000
   228,      0.500000,      0.500000,      2.000000
   229,      0.750000,      0.500000,      2.000000
   230,      0.500000,      0.750000,      2.000000
   231,      0.500000,      0.500000,      2.500000
   232,      0.500000,      0.250000,      3.000000
   233,      0.250000,      0.500000,      3.000000
   234,      0.500000,      0.500000,      3.000000
   235,      0.750000,      0.500000,      3.000000
   236,      0.500000,      0.750000,      3.000000
   237,      0.500000,      0.500000,      3.500000
   238,      0.500000,      0.250000,      4.000000
   239,      0.250000,      0.500000,      4.000000
   240,      0.500000,      0.500000,      4.000000
   540,      0.500000,      0.500000,      4.000000
   241,      0.750000,      0.500000,      4.000000
   242,      0.500000,      0.750000,      4.000000
   243,      0.500000,      0.500000,      4.500000
   244,      0.500000,      0.250000,      5.000000
   245,      0.250000,      0.500000,      5.000000
   246,      0.500000,      0.500000,      5.000000
   247,      0.750000,      0.500000,      5.000000
   248,      0.500000,      0.750000,      5.000000
   249,      0.500000,      0.500000,      5.500000
   250,      0.500000,      0.250000,      6.000000
   251,      0.250000,      0.500000,      6.000000
   252,      0.500000,      0.500000,      6.000000
   253,      0.750000,      0.500000,      6.000000
   254,      0.500000,      0.750000,      6.000000
   255,      0.500000,      0.500000,      6.500000
   256,      0.500000,      0.250000,      7.000000
   257,      0.250000,      0.500000,      7.000000
   258,      0.500000,      0.500000,      7.000000
   259,      0.750000,      0.500000,      7.000000
   260,      0.500000,      0.750000,      7.000000
   261,      0.500000,      0.500000,      7.500000
*ELEMENT, TYPE=C3D8  , ELSET=Eall
     1,     1,    10,    95,    19,    61,   105,   222,   192,     9,    93,
     2,    10,     2,    13,    95,   105,    34,   134,   222,    11,    12,
     3,    19,    95,    16,     4,   192,   222,   163,    79,    94,    97,
     4,    95,    13,     3,    16,   222,   134,    64,   163,    96,    14,
     5,    61,   105,   222,   192,    59,   109,   228,   196,   104,   220,
     6,   105,    34,   134,   222,   109,    36,   138,   228,   106,   133,
     7,   192,   222,   163,    79,   196,   228,   167,    81,   221,   224,
     8,   222,   134,    64,   163,   228,   138,    66,   167,   223,   135,
     9,    59,   109,   228,   196,    57,   113,   234,   200,   108,   226,
    10,   109,    36,   138,   228,   113,    38,   142,   234,   110,   137,
    11,   196,   228,   167,    81,   200,   234,   171,    83,   227,   230,
    12,   228,   138,    66,   167,   234,   142,    68,   171,   229,   139,
    13,    57,   113,   234,   200,    55,   117,   240,   204,   112,   232,
    14,   113,    38,   142,   234,   117,    40,   146,   240,   114,   141,
    15,   200,   234,   171,    83,   204,   240,   175,    85,   233,   236,
    16,   234,   142,    68,   171,   240,   146,    70,   175,   235,   143,
    17,    355,   417,   540,   504,    53,   121,   246,   208,   116,   238,
    18,   417,    340,   446,   540,   121,    42,   150,   246,   118,   145,
    19,   504,   540,   475,    385,   208,   246,   179,    87,   239,   242,
    20,   540,   446,    370,   475,   246,   150,    72,   179,   241,   147,
    21,    53,   121,   246,   208,    51,   125,   252,   212,   120,   244,
    22,   121,    42,   150,   246,   125,    44,   154,   252,   122,   149,
    23,   208,   246,   179,    87,   212,   252,   183,    89,   245,   248,
    24,   246,   150,    72,   179,   252,   154,    74,   183,   247,   151,
    25,    51,   125,   252,   212,    49,   129,   258,   216,   124,   250,
    26,   125,    44,   154,   252,   129,    46,   158,   258,   126,   153,
    27,   212,   252,   183,    89,   216,   258,   187,    91,   251,   254,
    28,   252,   154,    74,   183,   258,   158,    76,   187,   253,   155,
    29,    49,   129,   258,   216,     5,    22,   100,    31,   128,   256,
    30,   129,    46,   158,   258,    22,     6,    25,   100,   130,   157,
**    31,   216,   258,   187,    91,    31,   100,    28,     8,   257,   260,
**    32,   258,   158,    76,   187,   100,    25,     7,    28,   259,   159,
*EQUATION
2
355,1,1.,55,1,-1.
2
355,2,1.,55,2,-1.
2
355,3,1.,55,3,-1.
2
417,1,1.,117,1,-1.
2
417,2,1.,117,2,-1.
2
417,3,1.,117,3,-1.
2
340,1,1.,40,1,-1.
2
340,2,1.,40,2,-1.
2
340,3,1.,40,3,-1.
2
504,1,1.,204,1,-1.
2
504,2,1.,204,2,-1.
2
504,3,1.,204,3,-1.
2
540,1,1.,240,1,-1.
2
540,2,1.,240,2,-1.
2
540,3,1.,240,3,-1.
2
446,1,1.,146,1,-1.
2
446,2,1.,146,2,-1.
2
446,3,1.,146,3,-1.
2
385,1,1.,85,1,-1.
2
385,2,1.,85,2,-1.
2
385,3,1.,85,3,-1.
2
475,1,1.,175,1,-1.
2
475,2,1.,175,2,-1.
2
475,3,1.,175,3,-1.
2
370,1,1.,70,1,-1.
2
370,2,1.,70,2,-1.
2
370,3,1.,70,3,-1.
*NSET, NSET=FIX
    97,    96,    95,    94,    93,    20,    19,    18,    17,    16,    15,
    14,    13,    12,    11,    10,     9,     4,     3,     2,     1
*BOUNDARY
FIX, 1
*BOUNDARY
FIX, 2
*BOUNDARY
FIX, 3
*NSET,NSET=Nall,GENERATE
1,261
*MATERIAL,NAME=EL
*ELASTIC
  210000.0,        .3
*DENSITY
7.8E-9
*DESIGNVARIABLES,TYPE=COORDINATE
Nall
*SOLID SECTION,ELSET=Eall,MATERIAL=EL
*STEP
*STATIC
*CLOAD
100,3,1.E5
*NODE FILE
U
*END STEP
*STEP,PERTURBATION
*FREQUENCY,STORAGE=YES
10
*NODE FILE
U
*END STEP
*STEP,NLGEOM
*SENSITIVITY
*DESIGN RESPONSE, NAME=FREQ_OBJ
EIGENFREQUENCY
***FILTER,TYPE=EXPLICIT,EDGE PRESERVATION=YES
*NODE FILE
SEN
*END STEP
