**
**   Structure: cantilever beam.
**   Test objective: dynamic response to base motion;
**   	  	     with damping
**
*HEADING
Model: beam     Date: 14-Nov-2025
*NODE
         1,  1.0            ,  -1.5           ,  0.0
         2,  0.75           ,  -1.5           ,  0.0
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*ELEMENT,TYPE=C3D20R
         1,        49,       197,       182,        47,       206,       207,       208,       209,
       196,       199,       181,        48,       214,       215,       216,
       217,       210,       211,       212,       213
         2,       206,       207,       208,       209,       218,       219,       220,       221,
       214,       215,       216,       217,       226,       227,       228,
       229,       222,       223,       224,       225
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*NSET,NSET=NS_MOVE
         1,         2,         3,         4,         5,       304
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*NSET,NSET=N1
278
*ELSET,ELSET=EALL,GENERATE
1,100
*MATERIAL,NAME=EL
*ELASTIC
  210000.0 ,       .3
*DENSITY
7.8E-9
*SOLID SECTION,MATERIAL=EL,ELSET=EALL
*AMPLITUDE,NAME=A1
0.0000E+00, 0.00000000E+00
2.0000E-07, 5.02443182E-02
4.0000E-07, 1.00361715E-01
6.0000E-07, 1.50225589E-01
8.0000E-07, 1.99709981E-01
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1.0000E-04, -9.79717439E-16
*STEP
*FREQUENCY,STORAGE=YES
6
*BOUNDARY
NS_MOVE,1,3
*END STEP
*STEP,INC=1000
*MODAL DYNAMIC
2.0E-7,1.0E-4
*MODAL DAMPING,RAYLEIGH
,,5.E-3,1.E-3
*BASE MOTION,DOF=2,AMPLITUDE=A1,TYPE=DISPLACEMENT
*NODE PRINT,NSET=N1,FREQUENCY=10
U
*END STEP
