**
**   Structure: cantilever beam.
**   Test objective: forced convection with the heat transfer
**                   coefficient determined in the film.f
**                   user subroutine based on the Reynolds and
**                   Prandl number (Gnielinski equation)
**
*HEADING
Model: beam     Date: 10-Mar-1998
*NODE
     1,      0.000000,      0.000000,      0.000000
     2,      1.000000,      0.000000,      0.000000
     3,      1.000000,      1.000000,      0.000000
     4,      0.000000,      1.000000,      0.000000
     5,      0.000000,      0.000000,      8.000000
     6,      1.000000,      0.000000,      8.000000
     7,      1.000000,      1.000000,      8.000000
     8,      0.000000,      1.000000,      8.000000
     9,      0.250000,      0.000000,      0.000000
    10,      0.500000,      0.000000,      0.000000
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*ELEMENT, TYPE=C3D20R   , ELSET=B1
     1,     1,    10,    95,    19,    61,   105,   222,   192,     9,    93,
           94,    20,   104,   220,   221,   193,    62,   103,   219,   190
     2,    10,     2,    13,    95,   105,    34,   134,   222,    11,    12,
           96,    93,   106,   133,   223,   220,   103,    33,   132,   219
     3,    19,    95,    16,     4,   192,   222,   163,    79,    94,    97,
           17,    18,   221,   224,   164,   191,   190,   219,   161,    78
     4,    95,    13,     3,    16,   222,   134,    64,   163,    96,    14,
           15,    97,   223,   135,   162,   224,   219,   132,    63,   161
     5,    61,   105,   222,   192,    59,   109,   228,   196,   104,   220,
          221,   193,   108,   226,   227,   197,    60,   107,   225,   194
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*ELEMENT, TYPE=D,ELSET=EPIPE
33,263,272,264
34,264,273,265
35,265,274,266
36,266,275,267
37,267,276,268
38,268,277,269
39,269,278,270
40,270,279,271
*NSET, NSET=CN7
    97,    96,    95,    94,    93,    20,    19,    18,    17,    16,    15,
    14,    13,    12,    11,    10,     9,     4,     3,     2,     1
*NSET,NSET=Nall,GENERATE
1,271
*ELSET,ELSET=Eall,GENERATE
1,32
*MATERIAL,NAME=EL
*DENSITY
7854.
*CONDUCTIVITY
60.5
*SPECIFIC HEAT
434.
*SOLID SECTION,ELSET=Eall,MATERIAL=EL
*MATERIAL,NAME=WATER
*DENSITY
1000.
*FLUID CONSTANTS
4217.,1750.E-6,273.
*CONDUCTIVITY
569.e-3
*FLUID SECTION,ELSET=EPIPE,TYPE=PIPE WHITE-COLEBROOK,MATERIAL=WATER
0.7854e-4,1.e-2,0.,0.005e-3,1.
*NSET,NSET=GIBO
5,
6,
7,
8,
21,
22,
23,
24,
25,
26,
27,
28,
29,
30,
31,
32,
98,
99,
100,
101,
102,
*INITIAL CONDITIONS,TYPE=TEMPERATURE
Nall,20.
*NSET,NSET=Ntop
1,
2,
5,
6,
9,
10,
11,
21,
22,
23,
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*STEP,INC=100,THERMAL NETWORK
*HEAT TRANSFER,STEADY STATE
1.,1.
*BOUNDARY,MASS FLOW
272,1,1,0.01
273,1,1,0.01
274,1,1,0.01
275,1,1,0.01
276,1,1,0.01
277,1,1,0.01
278,1,1,0.01
279,1,1,0.01
*BOUNDARY
Ntop,11,11,20.
263,11,11,100.
*FILM
3, F5FCNU,263
4, F5FCNU,263
7, F5FCNU,264
8, F5FCNU,264
11, F5FCNU,265
12, F5FCNU,265
15, F5FCNU,266
16, F5FCNU,266
19, F5FCNU,267
20, F5FCNU,267
23, F5FCNU,268
24, F5FCNU,268
27, F5FCNU,269
28, F5FCNU,269
31, F5FCNU,270
32, F5FCNU,270
*CFLUX
268,11,3000.
*NODE FILE
NT
*END STEP
