**
**   Structure: cantilever beam.
**   Test objective: mean rotation MPC's (rotations) in combination
**                   with distributing coupling (translations)
**                   different nodes for the rotational and translational
**                   distribution: generation of substructure matrix
**
*HEADING
Model: beam     Date: 10-Mar-1998
*NODE
     1,      0.000000,      0.000000,      0.000000
     2,      1.000000,      0.000000,      0.000000
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*ELEMENT, TYPE=C3D20R   , ELSET=B1
    17,    55,   117,   240,   204,    53,   121,   246,   208,   116,   238,
          239,   205,   120,   244,   245,   209,    54,   119,   243,   206
    18,   117,    40,   146,   240,   121,    42,   150,   246,   118,   145,
          241,   238,   122,   149,   247,   244,   119,    41,   148,   243
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*ELEMENT,TYPE=DCOUP3D,ELSET=E1
33,268
*ELEMENT,TYPE=DCOUP3D,ELSET=E2
34,269
*NODE
268,0.,0.,0.
269,0.,0.,0.
*DISTRIBUTING COUPLING,ELSET=E1
LOAD1,1.
*DISTRIBUTING COUPLING,ELSET=E2
LOAD2,1.
*NSET,NSET=LOAD1
22,31,28,25
*NSET,NSET=LOAD2
117,146,175,204
*ELSET,ELSET=EALL,GENERATE
17,32
*MATERIAL,NAME=LIN_ISO_EL
*ELASTIC
210000.,.3
*SOLID SECTION,ELSET=EALL,MATERIAL=LIN_ISO_EL
*MPC
MEANROT,5,5,5,6,6,6,7,7,7,8,8,8,262
*MPC
MEANROT,5,5,5,6,6,6,7,7,7,8,8,8,263
*MPC
MEANROT,5,5,5,6,6,6,7,7,7,8,8,8,264
*MPC
MEANROT,40,40,40,70,70,70,55,55,55,85,85,85,265
*MPC
MEANROT,40,40,40,70,70,70,55,55,55,85,85,85,266
*MPC
MEANROT,40,40,40,70,70,70,55,55,55,85,85,85,267
*NSET,NSET=N1
262,263,264,265,266,267
*NSET,NSET=N2
268,269
*NSET,NSET=NOUT
262,263,264,265,266,267,268,269
*STEP
*SUBSTRUCTURE GENERATE
*RETAINED NODAL DOFS,SORTED=NO
N1,1,1
N2,1,3
*SUBSTRUCTURE MATRIX OUTPUT,STIFFNESS=YES,OUTPUT FILE=USER DEFINED,FILE NAME=beammrlin_diff
*END STEP
