**
**   Structure: cantilever beam.
**   Test objective: multiplicative decomposition of
**                   the total deformation gradient into
**                   a mechanical and thermal part.
**
*HEADING
Model: beam     Date: 10-Mar-1998
*NODE
     1,      0.000000,      0.000000,      0.000000
     2,      1.000000,      0.000000,      0.000000
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*ELEMENT, TYPE=C3D20R   , ELSET=Eall
     1,     1,    10,    95,    19,    61,   105,   222,   192,     9,    93,
           94,    20,   104,   220,   221,   193,    62,   103,   219,   190
     2,    10,     2,    13,    95,   105,    34,   134,   222,    11,    12,
           96,    93,   106,   133,   223,   220,   103,    33,   132,   219
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*NSET, NSET=FIX
    97,    96,    95,    94,    93,    20
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*BOUNDARY
FIX, 3,3
1,1,2
2,2,2
*NSET,NSET=Nall,GENERATE
1,261
*MATERIAL,NAME=EL
*ELASTIC
  210000.0,        .0
*EXPANSION,TYPE=ORTHO
0.,0.,12.E-6
*INITIAL CONDITIONS,TYPE=TEMPERATURE
Nall,0.
*SOLID SECTION,ELSET=Eall,MATERIAL=EL
*NSET,NSET=LOAD
5,6,7,8,22,25,28,31,100
*STEP,NLGEOM
*STATIC
*TEMPERATURE
Nall,0.
*CLOAD
LOAD,2,1.
*NODE FILE,FREQUENCY=1000
U
*EL FILE,FREQUENCY=1000
S,NOE
*END STEP
*STEP,NLGEOM,INC=1000
*STATIC
5.E-2,1.
*TEMPERATURE
Nall,8333.
*CLOAD
LOAD,2,1.
*END STEP
