**
**   Structure: cantilever beam.
**   Test objective: check the reaction forces in a node with
**                   a SPC in cylindrical coordinates
**
*HEADING
Model: beam     Date: 10-Mar-1998
*NODE
       1,0.000000000000e+00,8.535533905933e-01,6.066017177982e-02
       2,1.000000000000e+00,8.535533905933e-01,6.066017177982e-02
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*ELEMENT, TYPE=C3D20R   , ELSET=Eall
     1,     1,    10,    95,    19,    61,   105,   222,   192,     9,    93,
           94,    20,   104,   220,   221,   193,    62,   103,   219,   190
     2,    10,     2,    13,    95,   105,    34,   134,   222,    11,    12,
           96,    93,   106,   133,   223,   220,   103,    33,   132,   219
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*NSET,NSET=N1
95,246,258,179,100
*TRANSFORM,TYPE=C,NSET=N1
0.,.5,-1.,1.,.5,-1.
*BOUNDARY
95,1,1
246,2,3
258,2,3
179,3,3
*MATERIAL,NAME=EL
*ELASTIC
  210000.0,        .3
*SOLID SECTION,ELSET=Eall,MATERIAL=EL
*STEP
*STATIC
*CLOAD
100,1,1.
*NODE PRINT,NSET=N1,GLOBAL=YES
U,RF
*END STEP
