**
**   Structure: channel connecting two reservoirs.
**   Test objective: steep slope, frontwater curve,
**                   jump in the reservoir;
**                   thermal calculation included:
**                   - convection with the wall (*FILM)
**                   - discrete energy input (*CFLUX)
**
*NODE,NSET=NALL
1,0.,0.,0.
2,0.,0.,0.
4,0.05,0.,0.
6,.1,0.,0.
7,25.1,0.,-0.125
8,50.1,0.,-0.25
9,50.15,0.,-0.25
10,50.2,0.,-0.25
11,50.2,0.,-0.25
21,.1,-5.,.1
22,50.1,-5.,.1
24,.1,5.,.1
23,50.1,5.,.1
25,.1,-5.,.2
26,50.1,-5.,.2
28,.1,5.,.2
27,50.1,5.,.2
*ELEMENT,TYPE=C3D8,ELSET=ESOLID
7,21,22,23,24,25,26,27,28
*ELEMENT,TYPE=D,ELSET=EALL
1,0,1,2
2,2,4,6
4,6,7,8
5,8,9,10
6,10,11,0
*NSET,NSET=NWALL,GENERATE
21,28
*MATERIAL,NAME=EL
*ELASTIC
210000.,.3
*CONDUCTIVITY
50.
*SOLID SECTION,ELSET=ESOLID,MATERIAL=EL
*MATERIAL,NAME=WATER
*DENSITY
1000.
*FLUID CONSTANTS
4217.,1750.E-6,273.
*ELSET,ELSET=E1
1,6
*ELSET,ELSET=E2
2
*ELSET,ELSET=E4
4
*ELSET,ELSET=E5
5
*FLUID SECTION,ELSET=E1,TYPE=CHANNEL INOUT,MATERIAL=WATER
*FLUID SECTION,ELSET=E2,TYPE=CHANNEL SLUICE GATE,MANNING,MATERIAL=WATER
10.,0.,0.1,0.005,0.01,0.8
*FLUID SECTION,ELSET=E4,TYPE=CHANNEL STRAIGHT,MANNING,MATERIAL=WATER
10.,0.,49.8,0.005,0.01
*FLUID SECTION,ELSET=E5,TYPE=CHANNEL RESERVOIR,MANNING,MATERIAL=WATER
10.,0.,0.1,0.005,0.01
*PHYSICAL CONSTANTS,ABSOLUTE ZERO=0.
*STEP
*HEAT TRANSFER,STEADY STATE
*BOUNDARY
2,0,0,293.
10,2,2,1.6
NWALL,0,0,793.
*BOUNDARY,MASS FLOW
1,1,1,60000.
*DLOAD
EALL,GRAV,9.81,0.,0.,-1.
*FILM
7,F1FC,6,1.e6
*CFLUX
8,0,1.e10
*NODE PRINT,NSET=NALL
U,MF,PN,NT
*END STEP
