**
**   Structure: two cubes on top of each other.
**   Test objective: massless dynamic contact.
**                   friction; = contact17.inp but
**                   only displacement output in the
**                   frd file.
**
*NODE, NSET=Nall
       1,1.000000000000e+00,1.000000000000e+00,0.000000000000e+00
       2,1.000000000000e+00,0.000000000000e+00,0.000000000000e+00
       3,1.000000000000e+00,0.000000000000e+00,1.000000000000e+00
       4,1.000000000000e+00,1.000000000000e+00,1.000000000000e+00
       5,0.000000000000e+00,1.000000000000e+00,0.000000000000e+00
       6,0.000000000000e+00,0.000000000000e+00,0.000000000000e+00
       7,0.000000000000e+00,0.000000000000e+00,1.000000000000e+00
       8,0.000000000000e+00,1.000000000000e+00,1.000000000000e+00
       9,1.000000000000e+00,5.000000000000e-01,0.000000000000e+00
      10,1.000000000000e+00,0.000000000000e+00,5.000000000000e-01
      11,1.000000000000e+00,5.000000000000e-01,1.000000000000e+00
      12,1.000000000000e+00,1.000000000000e+00,5.000000000000e-01
      13,5.000000000000e-01,1.000000000000e+00,0.000000000000e+00
      14,5.000000000000e-01,0.000000000000e+00,0.000000000000e+00
      15,5.000000000000e-01,0.000000000000e+00,1.000000000000e+00
      16,5.000000000000e-01,1.000000000000e+00,1.000000000000e+00
      17,0.000000000000e+00,5.000000000000e-01,0.000000000000e+00
      18,0.000000000000e+00,0.000000000000e+00,5.000000000000e-01
      19,0.000000000000e+00,5.000000000000e-01,1.000000000000e+00
      20,0.000000000000e+00,1.000000000000e+00,5.000000000000e-01
      21,7.500000000000e-01,7.500000000000e-01,1.000000000000e+00
      22,7.500000000000e-01,2.500000000000e-01,1.000000000000e+00
      23,7.500000000000e-01,2.500000000000e-01,1.500000000000e+00
      24,7.500000000000e-01,7.500000000000e-01,1.500000000000e+00
      25,2.500000000000e-01,7.500000000000e-01,1.000000000000e+00
      26,2.500000000000e-01,2.500000000000e-01,1.000000000000e+00
      27,2.500000000000e-01,2.500000000000e-01,1.500000000000e+00
      28,2.500000000000e-01,7.500000000000e-01,1.500000000000e+00
      29,7.500000000000e-01,5.000000000000e-01,1.000000000000e+00
      30,7.500000000000e-01,2.500000000000e-01,1.250000000000e+00
      31,7.500000000000e-01,5.000000000000e-01,1.500000000000e+00
      32,7.500000000000e-01,7.500000000000e-01,1.250000000000e+00
      33,5.000000000000e-01,7.500000000000e-01,1.000000000000e+00
      34,5.000000000000e-01,2.500000000000e-01,1.000000000000e+00
      35,5.000000000000e-01,2.500000000000e-01,1.500000000000e+00
      36,5.000000000000e-01,7.500000000000e-01,1.500000000000e+00
      37,2.500000000000e-01,5.000000000000e-01,1.000000000000e+00
      38,2.500000000000e-01,2.500000000000e-01,1.250000000000e+00
      39,2.500000000000e-01,5.000000000000e-01,1.500000000000e+00
      40,2.500000000000e-01,7.500000000000e-01,1.250000000000e+00
*ELEMENT, TYPE=C3D8, ELSET=Eall
     1,     1,     2,     3,     4,     5,     6,     7,     8,
     2,    21,    22,    23,    24,    25,    26,    27,    28,
*NSET,NSET=Nfix
1,
2,
5,
6,
*BOUNDARY
Nfix,1,3
*SURFACE,NAME=Sslav
2, S3
*SURFACE,NAME=Smast
1, S5
*CONTACT PAIR,INTERACTION=SI1,TYPE=MASSLESS
Sslav,Smast
*SURFACE INTERACTION,NAME=SI1
*SURFACE BEHAVIOR,PRESSURE-OVERCLOSURE=HARD
*FRICTION
0.2
*MATERIAL,NAME=EL
*ELASTIC
210000.,.0
*DENSITY
7.8E-9
*SOLID SECTION,ELSET=Eall,MATERIAL=EL
*NSET,NSET=N1
23
*AMPLITUDE,NAME=A1
0.,0.,5.E-6,1.
*STEP,INC=1000,NLGEOM
*DYNAMIC,EXPLICIT
1.E-8,5.E-6,,2.5E-8
*DLOAD
2, P5, 100.000000
*CLOAD,AMPLITUDE=A1
27,1,1.
28,1,1.
*NODE FILE,NSET=N1,FREQUENCY=1
U
*END STEP
