**
**   Structure: cantilever beam.
**   Test objective: *COUPLING, *DISTRIBUTING for rotations.
**                   use of ORIENTATION on *COUPLING; axial force and torque
**                   (*CLOAD; no nlgeom)
**
*HEADING
Model: beam     Date: 10-Mar-1998
*NODE
       1,0.000000000000e+00,0.000000000000e+00,0.000000000000e+00
       2,8.571673007021e-01,0.000000000000e+00,-5.150380749101e-01
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*ELEMENT, TYPE=C3D20R, ELSET=Eall
     1,     1,    10,    95,    19,    61,   105,   222,   192,     9,    93,
          94,    20,   104,   220,   221,   193,    62,   103,   219,   190
     2,    10,     2,    13,    95,   105,    34,   134,   222,    11,    12,
          96,    93,   106,   133,   223,   220,   103,    33,   132,   219
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*NSET, NSET=FIX
    97,    96,    95,    94,    93,    20
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*BOUNDARY
FIX, 1
*BOUNDARY
FIX, 2
*BOUNDARY
FIX, 3
*MATERIAL,NAME=EL
*ELASTIC
  210000.0,        .3
*SOLID SECTION,ELSET=Eall,MATERIAL=EL
*NSET,NSET=LOAD
5,6,7,8,22,25,28,31,100
*SURFACE, NAME=S1
29,S2
30,S2
31,S2
32,S2
*ORIENTATION,NAME=OR1
0.857167,0.,-0.515038,0.150583,0.956305,0.250611
*COUPLING,REF NODE=262,SURFACE=S1,CONSTRAINT NAME=CN1,ORIENTATION=OR1
*DISTRIBUTING
6,6
*NSET,NSET=N1
262
*STEP
*STATIC
*CLOAD
262,3,7910.861
262,6,131.4474
*SECTION PRINT,SURFACE=S1,NAME=SP1
SOF,SOM
*END STEP
