**
**   Structure: channel connecting two reservoirs.
**   Test objective: mild slope, backwater curve,sinusoidal channel floor
**                   (analytical) example S6 from
**                   Amanda Jane Crossley, "Accurate and efficient
**                   numerical solutions for the Saint Venant
**                   equations of open channel flow", Ph.D. Thesis
**                   University of Nottingham (1999)
**                   Notice that "h**3" lacks in the formula for S0
**                   for example S6 in that reference
**
*NODE,NSET=NALL
1,-0.15,0.
2,-0.1,0.
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*ELEMENT,TYPE=D,ELSET=EALL
           1,0,1,2
	   2,2,3,4
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*MATERIAL,NAME=WATER
*DENSITY
1000.
*FLUID CONSTANTS
4217.,1750.E-6,273.
*ELSET,ELSET=E1
1,504
*ELSET,ELSET=E2
2
*ELSET,ELSET=E4,GENERATE
3,502
*ELSET,ELSET=E5
503
*FLUID SECTION,ELSET=E1,TYPE=CHANNEL INOUT,MATERIAL=WATER
*FLUID SECTION,ELSET=E2,TYPE=CHANNEL SLUICE GATE,MANNING,MATERIAL=WATER
10.,1.107149,0.1,0.0031177,0.03,10.
*FLUID SECTION,ELSET=E4,TYPE=CHANNEL STRAIGHT,MANNING,MATERIAL=WATER
10.,1.107149,-1.,-2.,0.03
*FLUID SECTION,ELSET=E5,TYPE=CHANNEL RESERVOIR,MANNING,MATERIAL=WATER
10.,1.107149,0.1,0.0032194,0.03
*BOUNDARY
1006,2,2,1.125
*BOUNDARY,MASS FLOW
1,1,1,20000.
*STEP
*HEAT TRANSFER,STEADY STATE
*DLOAD
EALL,GRAV,9.81,0.,-1.,0.
*NODE PRINT,NSET=NALL
PN
*END STEP
