**
**   Structure: two cubes.
**   Test objective: Newton gravity force.
**
*NODE, NSET=Nall
       1,  1.00000e+00,  1.00000e+00,  0.00000e+00
       2,  1.00000e+00,  0.00000e+00,  0.00000e+00
       3,  1.00000e+00,  0.00000e+00,  1.00000e+00
       4,  1.00000e+00,  1.00000e+00,  1.00000e+00
       5,  0.00000e+00,  1.00000e+00,  0.00000e+00
       6,  0.00000e+00,  0.00000e+00,  0.00000e+00
       7,  0.00000e+00,  0.00000e+00,  1.00000e+00
       8,  0.00000e+00,  1.00000e+00,  1.00000e+00
       9,  1.00000e+00,  5.00000e-01,  0.00000e+00
      10,  1.00000e+00,  0.00000e+00,  5.00000e-01
      11,  1.00000e+00,  5.00000e-01,  1.00000e+00
      12,  1.00000e+00,  1.00000e+00,  5.00000e-01
      13,  5.00000e-01,  1.00000e+00,  0.00000e+00
      14,  5.00000e-01,  0.00000e+00,  0.00000e+00
      15,  5.00000e-01,  0.00000e+00,  1.00000e+00
      16,  5.00000e-01,  1.00000e+00,  1.00000e+00
      17,  0.00000e+00,  5.00000e-01,  0.00000e+00
      18,  0.00000e+00,  0.00000e+00,  5.00000e-01
      19,  0.00000e+00,  5.00000e-01,  1.00000e+00
      20,  0.00000e+00,  1.00000e+00,  5.00000e-01
      21,  1.00000e+00,  1.00000e+00,  2.00000e+00
      22,  1.00000e+00,  0.00000e+00,  2.00000e+00
      23,  1.00000e+00,  0.00000e+00,  3.00000e+00
      24,  1.00000e+00,  1.00000e+00,  3.00000e+00
      25,  0.00000e+00,  1.00000e+00,  2.00000e+00
      26,  0.00000e+00,  0.00000e+00,  2.00000e+00
      27,  0.00000e+00,  0.00000e+00,  3.00000e+00
      28,  0.00000e+00,  1.00000e+00,  3.00000e+00
      29,  1.00000e+00,  5.00000e-01,  2.00000e+00
      30,  1.00000e+00,  0.00000e+00,  2.50000e+00
      31,  1.00000e+00,  5.00000e-01,  3.00000e+00
      32,  1.00000e+00,  1.00000e+00,  2.50000e+00
      33,  5.00000e-01,  1.00000e+00,  2.00000e+00
      34,  5.00000e-01,  0.00000e+00,  2.00000e+00
      35,  5.00000e-01,  0.00000e+00,  3.00000e+00
      36,  5.00000e-01,  1.00000e+00,  3.00000e+00
      37,  0.00000e+00,  5.00000e-01,  2.00000e+00
      38,  0.00000e+00,  0.00000e+00,  2.50000e+00
      39,  0.00000e+00,  5.00000e-01,  3.00000e+00
      40,  0.00000e+00,  1.00000e+00,  2.50000e+00
*ELEMENT, TYPE=C3D20R, ELSET=Eall
     1,     1,     2,     3,     4,     5,     6,     7,     8,     9,    10,
          11,    12,    17,    18,    19,    20,    13,    14,    15,    16
     2,    21,    22,    23,    24,    25,    26,    27,    28,    29,    30,
          31,    32,    37,    38,    39,    40,    33,    34,    35,    36
*NSET,NSET=NN1
1,
2,
3,
4,
5,
6,
7,
8,
9,
10,
11,
12,
13,
14,
15,
16,
17,
18,
19,
20,
*NSET,NSET=NN2
21,
22,
23,
24,
25,
26,
27,
28,
29,
30,
31,
32,
33,
34,
35,
36,
37,
38,
39,
40,
*MATERIAL,NAME=EL
*ELASTIC
210000.,.3
*DENSITY
7.8
*SOLID SECTION,ELSET=Eall,MATERIAL=EL
*PHYSICAL CONSTANTS,NEWTON GRAVITY=66.7
*INITIAL CONDITIONS,TYPE=VELOCITY
NN2,1,0.
**
*STEP
*DYNAMIC
1.e-4,1.e-2
*DLOAD
Eall,NEWTON
*NODE PRINT,NSET=Nall,FREQUENCY=5
U
*EL FILE,NSET=Nall
ENER
*END STEP
