**
**   Structure: two cubes.
**   Test objective: Penalty contact.
**
*NODE, NSET=Nall
       1,1.000000000000e+00,1.000000000000e+00,0.000000000000e+00
       2,1.000000000000e+00,6.666666666667e-01,0.000000000000e+00
       3,1.000000000000e+00,6.666666666667e-01,3.333333333333e-01
       4,1.000000000000e+00,1.000000000000e+00,3.333333333333e-01
       5,6.666666666667e-01,1.000000000000e+00,0.000000000000e+00
       6,6.666666666667e-01,6.666666666667e-01,0.000000000000e+00
       7,6.666666666667e-01,6.666666666667e-01,3.333333333333e-01
       8,6.666666666667e-01,1.000000000000e+00,3.333333333333e-01
       9,1.000000000000e+00,6.666666666667e-01,6.666666666667e-01
      10,1.000000000000e+00,1.000000000000e+00,6.666666666667e-01
      11,6.666666666667e-01,6.666666666667e-01,6.666666666667e-01
      12,6.666666666667e-01,1.000000000000e+00,6.666666666667e-01
      13,1.000000000000e+00,6.666666666667e-01,1.000000000000e+00
      14,1.000000000000e+00,1.000000000000e+00,1.000000000000e+00
      15,6.666666666667e-01,6.666666666667e-01,1.000000000000e+00
      16,6.666666666667e-01,1.000000000000e+00,1.000000000000e+00
      17,3.333333333333e-01,1.000000000000e+00,0.000000000000e+00
      18,3.333333333333e-01,6.666666666667e-01,0.000000000000e+00
      19,3.333333333333e-01,6.666666666667e-01,3.333333333333e-01
      20,3.333333333333e-01,1.000000000000e+00,3.333333333333e-01
      21,3.333333333333e-01,6.666666666667e-01,6.666666666667e-01
      22,3.333333333333e-01,1.000000000000e+00,6.666666666667e-01
      23,3.333333333333e-01,6.666666666667e-01,1.000000000000e+00
      24,3.333333333333e-01,1.000000000000e+00,1.000000000000e+00
      25,0.000000000000e+00,1.000000000000e+00,0.000000000000e+00
      26,0.000000000000e+00,6.666666666667e-01,0.000000000000e+00
      27,0.000000000000e+00,6.666666666667e-01,3.333333333333e-01
      28,0.000000000000e+00,1.000000000000e+00,3.333333333333e-01
      29,0.000000000000e+00,6.666666666667e-01,6.666666666667e-01
      30,0.000000000000e+00,1.000000000000e+00,6.666666666667e-01
      31,0.000000000000e+00,6.666666666667e-01,1.000000000000e+00
      32,0.000000000000e+00,1.000000000000e+00,1.000000000000e+00
      33,1.000000000000e+00,3.333333333333e-01,0.000000000000e+00
      34,1.000000000000e+00,3.333333333333e-01,3.333333333333e-01
      35,6.666666666667e-01,3.333333333333e-01,0.000000000000e+00
      36,6.666666666667e-01,3.333333333333e-01,3.333333333333e-01
      37,1.000000000000e+00,3.333333333333e-01,6.666666666667e-01
      38,6.666666666667e-01,3.333333333333e-01,6.666666666667e-01
      39,1.000000000000e+00,3.333333333333e-01,1.000000000000e+00
      40,6.666666666667e-01,3.333333333333e-01,1.000000000000e+00
      41,3.333333333333e-01,3.333333333333e-01,0.000000000000e+00
      42,3.333333333333e-01,3.333333333333e-01,3.333333333333e-01
      43,3.333333333333e-01,3.333333333333e-01,6.666666666667e-01
      44,3.333333333333e-01,3.333333333333e-01,1.000000000000e+00
      45,0.000000000000e+00,3.333333333333e-01,0.000000000000e+00
      46,0.000000000000e+00,3.333333333333e-01,3.333333333333e-01
      47,0.000000000000e+00,3.333333333333e-01,6.666666666667e-01
      48,0.000000000000e+00,3.333333333333e-01,1.000000000000e+00
      49,1.000000000000e+00,0.000000000000e+00,0.000000000000e+00
      50,1.000000000000e+00,0.000000000000e+00,3.333333333333e-01
      51,6.666666666667e-01,0.000000000000e+00,0.000000000000e+00
      52,6.666666666667e-01,0.000000000000e+00,3.333333333333e-01
      53,1.000000000000e+00,0.000000000000e+00,6.666666666667e-01
      54,6.666666666667e-01,0.000000000000e+00,6.666666666667e-01
      55,1.000000000000e+00,0.000000000000e+00,1.000000000000e+00
      56,6.666666666667e-01,0.000000000000e+00,1.000000000000e+00
      57,3.333333333333e-01,0.000000000000e+00,0.000000000000e+00
      58,3.333333333333e-01,0.000000000000e+00,3.333333333333e-01
      59,3.333333333333e-01,0.000000000000e+00,6.666666666667e-01
      60,3.333333333333e-01,0.000000000000e+00,1.000000000000e+00
      61,0.000000000000e+00,0.000000000000e+00,0.000000000000e+00
      62,0.000000000000e+00,0.000000000000e+00,3.333333333333e-01
      63,0.000000000000e+00,0.000000000000e+00,6.666666666667e-01
      64,0.000000000000e+00,0.000000000000e+00,1.000000000000e+00
      65,5.000000000000e-01,5.000000000000e-01,1.000000000000e+00
      66,5.000000000000e-01,3.333333333333e-01,1.000000000000e+00
      67,5.000000000000e-01,3.333333333333e-01,1.166666666667e+00
      68,5.000000000000e-01,5.000000000000e-01,1.166666666667e+00
      69,3.333333333333e-01,5.000000000000e-01,1.000000000000e+00
      70,3.333333333333e-01,3.333333333333e-01,1.000000000000e+00
      71,3.333333333333e-01,3.333333333333e-01,1.166666666667e+00
      72,3.333333333333e-01,5.000000000000e-01,1.166666666667e+00
      73,5.000000000000e-01,3.333333333333e-01,1.333333333333e+00
      74,5.000000000000e-01,5.000000000000e-01,1.333333333333e+00
      75,3.333333333333e-01,3.333333333333e-01,1.333333333333e+00
      76,3.333333333333e-01,5.000000000000e-01,1.333333333333e+00
      77,5.000000000000e-01,3.333333333333e-01,1.500000000000e+00
      78,5.000000000000e-01,5.000000000000e-01,1.500000000000e+00
      79,3.333333333333e-01,3.333333333333e-01,1.500000000000e+00
      80,3.333333333333e-01,5.000000000000e-01,1.500000000000e+00
      81,1.666666666667e-01,5.000000000000e-01,1.000000000000e+00
      82,1.666666666667e-01,3.333333333333e-01,1.000000000000e+00
      83,1.666666666667e-01,3.333333333333e-01,1.166666666667e+00
      84,1.666666666667e-01,5.000000000000e-01,1.166666666667e+00
      85,1.666666666667e-01,3.333333333333e-01,1.333333333333e+00
      86,1.666666666667e-01,5.000000000000e-01,1.333333333333e+00
      87,1.666666666667e-01,3.333333333333e-01,1.500000000000e+00
      88,1.666666666667e-01,5.000000000000e-01,1.500000000000e+00
      89,0.000000000000e+00,5.000000000000e-01,1.000000000000e+00
      90,0.000000000000e+00,3.333333333333e-01,1.000000000000e+00
      91,0.000000000000e+00,3.333333333333e-01,1.166666666667e+00
      92,0.000000000000e+00,5.000000000000e-01,1.166666666667e+00
      93,0.000000000000e+00,3.333333333333e-01,1.333333333333e+00
      94,0.000000000000e+00,5.000000000000e-01,1.333333333333e+00
      95,0.000000000000e+00,3.333333333333e-01,1.500000000000e+00
      96,0.000000000000e+00,5.000000000000e-01,1.500000000000e+00
      97,5.000000000000e-01,1.666666666667e-01,1.000000000000e+00
      98,5.000000000000e-01,1.666666666667e-01,1.166666666667e+00
      99,3.333333333333e-01,1.666666666667e-01,1.000000000000e+00
     100,3.333333333333e-01,1.666666666667e-01,1.166666666667e+00
     101,5.000000000000e-01,1.666666666667e-01,1.333333333333e+00
     102,3.333333333333e-01,1.666666666667e-01,1.333333333333e+00
     103,5.000000000000e-01,1.666666666667e-01,1.500000000000e+00
     104,3.333333333333e-01,1.666666666667e-01,1.500000000000e+00
     105,1.666666666667e-01,1.666666666667e-01,1.000000000000e+00
     106,1.666666666667e-01,1.666666666667e-01,1.166666666667e+00
     107,1.666666666667e-01,1.666666666667e-01,1.333333333333e+00
     108,1.666666666667e-01,1.666666666667e-01,1.500000000000e+00
     109,0.000000000000e+00,1.666666666667e-01,1.000000000000e+00
     110,0.000000000000e+00,1.666666666667e-01,1.166666666667e+00
     111,0.000000000000e+00,1.666666666667e-01,1.333333333333e+00
     112,0.000000000000e+00,1.666666666667e-01,1.500000000000e+00
     113,5.000000000000e-01,0.000000000000e+00,1.000000000000e+00
     114,5.000000000000e-01,0.000000000000e+00,1.166666666667e+00
     115,3.333333333333e-01,0.000000000000e+00,1.000000000000e+00
     116,3.333333333333e-01,0.000000000000e+00,1.166666666667e+00
     117,5.000000000000e-01,0.000000000000e+00,1.333333333333e+00
     118,3.333333333333e-01,0.000000000000e+00,1.333333333333e+00
     119,5.000000000000e-01,0.000000000000e+00,1.500000000000e+00
     120,3.333333333333e-01,0.000000000000e+00,1.500000000000e+00
     121,1.666666666667e-01,0.000000000000e+00,1.000000000000e+00
     122,1.666666666667e-01,0.000000000000e+00,1.166666666667e+00
     123,1.666666666667e-01,0.000000000000e+00,1.333333333333e+00
     124,1.666666666667e-01,0.000000000000e+00,1.500000000000e+00
     125,0.000000000000e+00,0.000000000000e+00,1.000000000000e+00
     126,0.000000000000e+00,0.000000000000e+00,1.166666666667e+00
     127,0.000000000000e+00,0.000000000000e+00,1.333333333333e+00
     128,0.000000000000e+00,0.000000000000e+00,1.500000000000e+00
*ELEMENT, TYPE=C3D8, ELSET=Eall
     1,     1,     2,     3,     4,     5,     6,     7,     8
     2,     4,     3,     9,    10,     8,     7,    11,    12
     3,    10,     9,    13,    14,    12,    11,    15,    16
     4,     5,     6,     7,     8,    17,    18,    19,    20
     5,     8,     7,    11,    12,    20,    19,    21,    22
     6,    12,    11,    15,    16,    22,    21,    23,    24
     7,    17,    18,    19,    20,    25,    26,    27,    28
     8,    20,    19,    21,    22,    28,    27,    29,    30
     9,    22,    21,    23,    24,    30,    29,    31,    32
    10,     2,    33,    34,     3,     6,    35,    36,     7
    11,     3,    34,    37,     9,     7,    36,    38,    11
    12,     9,    37,    39,    13,    11,    38,    40,    15
    13,     6,    35,    36,     7,    18,    41,    42,    19
    14,     7,    36,    38,    11,    19,    42,    43,    21
    15,    11,    38,    40,    15,    21,    43,    44,    23
    16,    18,    41,    42,    19,    26,    45,    46,    27
    17,    19,    42,    43,    21,    27,    46,    47,    29
    18,    21,    43,    44,    23,    29,    47,    48,    31
    19,    33,    49,    50,    34,    35,    51,    52,    36
    20,    34,    50,    53,    37,    36,    52,    54,    38
    21,    37,    53,    55,    39,    38,    54,    56,    40
    22,    35,    51,    52,    36,    41,    57,    58,    42
    23,    36,    52,    54,    38,    42,    58,    59,    43
    24,    38,    54,    56,    40,    43,    59,    60,    44
    25,    41,    57,    58,    42,    45,    61,    62,    46
    26,    42,    58,    59,    43,    46,    62,    63,    47
    27,    43,    59,    60,    44,    47,    63,    64,    48
    28,    65,    66,    67,    68,    69,    70,    71,    72
    29,    68,    67,    73,    74,    72,    71,    75,    76
    30,    74,    73,    77,    78,    76,    75,    79,    80
    31,    69,    70,    71,    72,    81,    82,    83,    84
    32,    72,    71,    75,    76,    84,    83,    85,    86
    33,    76,    75,    79,    80,    86,    85,    87,    88
    34,    81,    82,    83,    84,    89,    90,    91,    92
    35,    84,    83,    85,    86,    92,    91,    93,    94
    36,    86,    85,    87,    88,    94,    93,    95,    96
    37,    66,    97,    98,    67,    70,    99,   100,    71
    38,    67,    98,   101,    73,    71,   100,   102,    75
    39,    73,   101,   103,    77,    75,   102,   104,    79
    40,    70,    99,   100,    71,    82,   105,   106,    83
    41,    71,   100,   102,    75,    83,   106,   107,    85
    42,    75,   102,   104,    79,    85,   107,   108,    87
    43,    82,   105,   106,    83,    90,   109,   110,    91
    44,    83,   106,   107,    85,    91,   110,   111,    93
    45,    85,   107,   108,    87,    93,   111,   112,    95
    46,    97,   113,   114,    98,    99,   115,   116,   100
    47,    98,   114,   117,   101,   100,   116,   118,   102
    48,   101,   117,   119,   103,   102,   118,   120,   104
    49,    99,   115,   116,   100,   105,   121,   122,   106
    50,   100,   116,   118,   102,   106,   122,   123,   107
    51,   102,   118,   120,   104,   107,   123,   124,   108
    52,   105,   121,   122,   106,   109,   125,   126,   110
    53,   106,   122,   123,   107,   110,   126,   127,   111
    54,   107,   123,   124,   108,   111,   127,   128,   112
*MATERIAL,NAME=EL
*ELASTIC
210000.,.0
*SOLID SECTION,ELSET=Eall,MATERIAL=EL
*NSET,NSET=Nfix
1,
2,
5,
6,
17,
18,
25,
26,
33,
35,
41,
45,
49,
51,
57,
61,
*NSET,NSET=Nload
77,
78,
79,
80,
87,
88,
95,
96,
103,
104,
108,
112,
119,
120,
124,
128,
*BOUNDARY
Nfix,1,3
Nload,1,2
*SURFACE, NAME=Smast
3, S5
6, S5
9, S5
12, S5
15, S5
18, S5
21, S5
24, S5
27, S5
*SURFACE, NAME=Sslav
28, S3
31, S3
34, S3
37, S3
40, S3
43, S3
46, S3
49, S3
52, S3
*CONTACT PAIR,INTERACTION=SI1,TYPE=NODE TO SURFACE
Sslav,Smast
*SURFACE INTERACTION,NAME=SI1
*SURFACE BEHAVIOR,PRESSURE-OVERCLOSURE=LINEAR
1.e6,3.
*STEP,NLGEOM
*STATIC
1.,1.
*DLOAD
30, P5, 100.000000
33, P5, 100.000000
36, P5, 100.000000
39, P5, 100.000000
42, P5, 100.000000
45, P5, 100.000000
48, P5, 100.000000
51, P5, 100.000000
54, P5, 100.000000
*NODE PRINT,NSET=Nall
U
*NODE FILE
U
*EL FILE,POSITION=NODES
S,NOE
*CONTACT FILE
CDISP,CSTRESS
*END STEP
