**
**   Structure: simplified blade.
**   Test objective: cyclic symmetry with contact;
**
*NODE, NSET=Nall
       1,1.000000000000e+01,-1.496992000000e+01,2.014445400000e+02
       2,7.500000000000e+00,-1.746931250000e+01,2.011961675000e+02
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*ELEMENT, TYPE=C3D8, ELSET=Eall
     1,     1,     2,     3,     4,     5,     6,     7,     8
     2,     4,     3,     9,    10,     8,     7,    11,    12
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*MATERIAL,NAME=MAT1
*ELASTIC
.75E5,0.3
*DENSITY
2.65E-9
*EXPANSION
0.
*SOLID SECTION,ELSET=EL1,MATERIAL=MAT1
*MATERIAL,NAME=MAT2
*ELASTIC
.75E5,0.3
*DENSITY
2.65E-9
*EXPANSION
12.E-5
*SOLID SECTION,ELSET=EL2,MATERIAL=MAT2
** Surfaces based on CYC1
*SURFACE, NAME=SCYC1
17, S3
25, S3
19, S3
27, S3
21, S3
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463, S3
** Surfaces based on CYC2
*SURFACE, NAME=SCYC2
178, S5
186, S5
180, S5
188, S5
182, S5
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624, S5
*TIE,NAME=TIE1,CYCLIC SYMMETRY
SCYC1,SCYC2
*CYCLIC SYMMETRY MODEL,N=72, NGRAPH=1,TIE=TIE1,ELSET=EL1
0.,0.,0., 1.,0.,0.
*TIE,NAME=TIE2,CYCLIC SYMMETRY
Sdep,Sind
*CYCLIC SYMMETRY MODEL,N=72, NGRAPH=1,TIE=TIE2,SLAVE=Sdep,MASTER=Sind,ELSET=EL2
0.,0.,0., 1.,0.,0.
*CONTACT PAIR,INTERACTION=SI1,TYPE=SURFACE TO SURFACE
Sdep,Sind
*SURFACE INTERACTION,NAME=SI1
*SURFACE BEHAVIOR,PRESSURE-OVERCLOSURE=LINEAR
1.E7
*FRICTION
.2,1.E5
** Names based on spcy
*NSET,NSET=Nspcy
354,
365,
375,
** Names based on spcx
*NSET,NSET=Nspcx
72,
89,
104,
282,
294,
304,
352,
364,
374,
*ELSET,ELSET=EL2
1,
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*ELSET,ELSET=EL1
17,
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** Surfaces based on ind
*SURFACE, NAME=Sind
162, S5
166, S5
164, S5
168, S5
170, S5
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592, S5
** Surfaces based on dep
*SURFACE, NAME=Sdep
1, S3
5, S3
3, S3
7, S3
9, S3
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431, S3
** Names based on nodup
*NSET,NSET=Nnodup
1,
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*INITIAL CONDITIONS,TYPE=TEMPERATURE
Nall,293.
*STEP
*STATIC
*DLOAD
Eall, CENTRIF, 9869604.4,  0., 0., 0.,  1., 0., 0.
*TEMPERATURE
Nall,1293.
*BOUNDARY
Nspcx,1
Nspcy,2
*node print,nset=Nnodup
u
***node file
**u,nt
***el file
**s,noe
***contact file
**cdisp,cstre
*END STEP
