**
** freq analysis results ccx vs. abq
**
** ccx
**
** No.    f
** 1 0.3971608E+00
** 2 0.1575568E+01
** 3 0.2516759E+01
** 4 0.5304120E+01
** 5 0.7309380E+01
** 6 0.8332415E+01
** 7 0.9185346E+01
** 8 0.1082032E+02
** 9 0.1333986E+02
** 10 0.1564534E+02
**
** abq
**
** No.    f
** 1  0.39720
** 2  1.5722
** 3  2.5122
** 4  5.2910
** 5  7.2713
** 6  8.4178
** 7  9.0121
** 8  10.782
** 9  13.211
** 10 15.493


*NODE, NSET=Nall
      1,           0.,           0.,           0.
      2,          4.5,           0.,           0.
      3,           9.,           0.,           0.
      4,         13.5,           0.,           0.
      5,          18.,           0.,           0.
      6,         22.5,           0.,           0.
      7,          27.,           0.,           0.
      8,         31.5,           0.,           0.
      9,          36.,           0.,           0.
     10,         40.5,           0.,           0.
     11,          45.,           0.,           0.
     12,           0.,   4.16666651,           0.
     13,          4.5,   4.16666651,           0.
     14,           9.,   4.16666651,           0.
     15,         13.5,   4.16666651,           0.
     16,          18.,   4.16666651,           0.
     17,         22.5,   4.16666651,           0.
     18,          27.,   4.16666651,           0.
     19,         31.5,   4.16666651,           0.
     20,          36.,   4.16666651,           0.
     21,         40.5,   4.16666651,           0.
     22,          45.,   4.16666651,           0.
     23,           0.,   8.33333302,           0.
     24,          4.5,   8.33333302,           0.
     25,           9.,   8.33333302,           0.
     26,         13.5,   8.33333302,           0.
     27,          18.,   8.33333302,           0.
     28,         22.5,   8.33333302,           0.
     29,          27.,   8.33333302,           0.
     30,         31.5,   8.33333302,           0.
     31,          36.,   8.33333302,           0.
     32,         40.5,   8.33333302,           0.
     33,          45.,   8.33333302,           0.
     34,           0.,         12.5,           0.
     35,          4.5,         12.5,           0.
     36,           9.,         12.5,           0.
     37,         13.5,         12.5,           0.
     38,          18.,         12.5,           0.
     39,         22.5,         12.5,           0.
     40,          27.,         12.5,           0.
     41,         31.5,         12.5,           0.
     42,          36.,         12.5,           0.
     43,         40.5,         12.5,           0.
     44,          45.,         12.5,           0.
     45,           0.,    16.666666,           0.
     46,          4.5,    16.666666,           0.
     47,           9.,    16.666666,           0.
     48,         13.5,    16.666666,           0.
     49,          18.,    16.666666,           0.
     50,         22.5,    16.666666,           0.
     51,          27.,    16.666666,           0.
     52,         31.5,    16.666666,           0.
     53,          36.,    16.666666,           0.
     54,         40.5,    16.666666,           0.
     55,          45.,    16.666666,           0.
     56,           0.,    20.833334,           0.
     57,          4.5,    20.833334,           0.
     58,           9.,    20.833334,           0.
     59,         13.5,    20.833334,           0.
     60,          18.,    20.833334,           0.
     61,         22.5,    20.833334,           0.
     62,          27.,    20.833334,           0.
     63,         31.5,    20.833334,           0.
     64,          36.,    20.833334,           0.
     65,         40.5,    20.833334,           0.
     66,          45.,    20.833334,           0.
     67,           0.,          25.,           0.
     68,          4.5,          25.,           0.
     69,           9.,          25.,           0.
     70,         13.5,          25.,           0.
     71,          18.,          25.,           0.
     72,         22.5,          25.,           0.
     73,          27.,          25.,           0.
     74,         31.5,          25.,           0.
     75,          36.,          25.,           0.
     76,         40.5,          25.,           0.
     77,          45.,          25.,           0.
*Element, type=us3, ELSET=Eall
  1,  1,  2, 13
  2, 13, 12,  1
  3,  2,  3, 14
  4, 14, 13,  2
  5,  3,  4, 15
  6, 15, 14,  3
  7,  4,  5, 16
  8, 16, 15,  4
  9,  5,  6, 17
 10, 17, 16,  5
 11,  6,  7, 18
 12, 18, 17,  6
 13,  7,  8, 19
 14, 19, 18,  7
 15,  8,  9, 20
 16, 20, 19,  8
 17,  9, 10, 21
 18, 21, 20,  9
 19, 10, 11, 22
 20, 22, 21, 10
 21, 12, 13, 24
 22, 24, 23, 12
 23, 13, 14, 25
 24, 25, 24, 13
 25, 14, 15, 26
 26, 26, 25, 14
 27, 15, 16, 27
 28, 27, 26, 15
 29, 16, 17, 28
 30, 28, 27, 16
 31, 17, 18, 29
 32, 29, 28, 17
 33, 18, 19, 30
 34, 30, 29, 18
 35, 19, 20, 31
 36, 31, 30, 19
 37, 20, 21, 32
 38, 32, 31, 20
 39, 21, 22, 33
 40, 33, 32, 21
 41, 23, 24, 35
 42, 35, 34, 23
 43, 24, 25, 36
 44, 36, 35, 24
 45, 25, 26, 37
 46, 37, 36, 25
 47, 26, 27, 38
 48, 38, 37, 26
 49, 27, 28, 39
 50, 39, 38, 27
 51, 28, 29, 40
 52, 40, 39, 28
 53, 29, 30, 41
 54, 41, 40, 29
 55, 30, 31, 42
 56, 42, 41, 30
 57, 31, 32, 43
 58, 43, 42, 31
 59, 32, 33, 44
 60, 44, 43, 32
 61, 34, 35, 46
 62, 46, 45, 34
 63, 35, 36, 47
 64, 47, 46, 35
 65, 36, 37, 48
 66, 48, 47, 36
 67, 37, 38, 49
 68, 49, 48, 37
 69, 38, 39, 50
 70, 50, 49, 38
 71, 39, 40, 51
 72, 51, 50, 39
 73, 40, 41, 52
 74, 52, 51, 40
 75, 41, 42, 53
 76, 53, 52, 41
 77, 42, 43, 54
 78, 54, 53, 42
 79, 43, 44, 55
 80, 55, 54, 43
 81, 45, 46, 57
 82, 57, 56, 45
 83, 46, 47, 58
 84, 58, 57, 46
 85, 47, 48, 59
 86, 59, 58, 47
 87, 48, 49, 60
 88, 60, 59, 48
 89, 49, 50, 61
 90, 61, 60, 49
 91, 50, 51, 62
 92, 62, 61, 50
 93, 51, 52, 63
 94, 63, 62, 51
 95, 52, 53, 64
 96, 64, 63, 52
 97, 53, 54, 65
 98, 65, 64, 53
 99, 54, 55, 66
100, 66, 65, 54
101, 56, 57, 68
102, 68, 67, 56
103, 57, 58, 69
104, 69, 68, 57
105, 58, 59, 70
106, 70, 69, 58
107, 59, 60, 71
108, 71, 70, 59
109, 60, 61, 72
110, 72, 71, 60
111, 61, 62, 73
112, 73, 72, 61
113, 62, 63, 74
114, 74, 73, 62
115, 63, 64, 75
116, 75, 74, 63
117, 64, 65, 76
118, 76, 75, 64
119, 65, 66, 77
120, 77, 76, 65
*USER ELEMENT,TYPE=us3,NODES=3,INTEGRATION POINTS=3,MAXDOF=6


*USER SECTION,ELSET=Eall,MATERIAL=Material-1,CONSTANTS=6
1.0

*Nset, nset=Set-1, generate
  1,  67,  11

*Material, name=Material-1
*Density
9000.,
*Elastic
 2.1e+11, 0.3

*Step,
*Frequency,
10,


*Boundary
Set-1, 1, 1
Set-1, 2, 2
Set-1, 3, 3
Set-1, 4, 4
Set-1, 5, 5
Set-1, 6, 6

*NODE FILE
U
*END STEP
