**
**   Structure: very thin shell subject to shear.
**   Test objective: tension-only material
**
*NODE, NSET=Nall
       1,2.290000000000e+02,0.000000000000e+00,2.37788e-05
       2,2.061000000000e+02,0.000000000000e+00,2.91066e-05
       3,2.061000000000e+02,2.290000000000e+01,8.45814e-05
       4,2.290000000000e+02,2.290000000000e+01,1.52208e-05
       5,2.175500000000e+02,0.000000000000e+00,5.85537e-05
       6,2.061000000000e+02,1.145000000000e+01,1.93475e-05
       7,2.175500000000e+02,2.290000000000e+01,8.10623e-05
       8,2.290000000000e+02,1.145000000000e+01,1.73531e-05
       9,2.061000000000e+02,4.580000000000e+01,4.84983e-05
      10,2.290000000000e+02,4.580000000000e+01,1.51863e-05
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*ELEMENT, TYPE=S8, ELSET=Eall
     1,      1,      2,      3,      4,      5,      6,      7,      8
     2,      4,      3,      9,     10,      7,     11,     12,     13
     3,     10,      9,     14,     15,     12,     16,     17,     18
     4,     15,     14,     19,     20,     17,     21,     22,     23
     5,     20,     19,     24,     25,     22,     26,     27,     28
     6,     25,     24,     29,     30,     27,     31,     32,     33
     7,     30,     29,     34,     35,     32,     36,     37,     38
     8,     35,     34,     39,     40,     37,     41,     42,     43
     9,     40,     39,     44,     45,     42,     46,     47,     48
    10,     45,     44,     49,     50,     47,     51,     52,     53
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*MATERIAL,NAME=TENSION_ONLY
*USER MATERIAL,CONSTANTS=2
  3790.,        1.
*SHELL SECTION,ELSET=Eall,MATERIAL=TENSION_ONLY
0.0762
*NSET,NSET=Ntop
1,
4,
8,
10,
13,
15,
18,
20,
23,
25,
28,
30,
33,
35,
38,
40,
43,
45,
48,
50,
53,
*NSET,NSET=Nbottom
310,
311,
313,
315,
316,
318,
319,
321,
322,
324,
325,
327,
328,
330,
331,
333,
334,
336,
337,
339,
340,
*BOUNDARY
Nbottom,1,3
Ntop,1,1
Ntop,3,3
*STEP,NLGEOM,INC=1000
*STATIC
.25,1.
*BOUNDARY
Ntop,2,2,-1.
*NODE FILE,FREQUENCY=1000
U
*EL FILE
S,NOE
*END STEP
