** v @ node 1 = 22.3


*Node,Nset=Nall
      1,          48.,          52.,           0.
      2,          24.,          37.,           0.
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*Element, type=us3, ELSET=Eall
 1,  1, 16,  4
 2, 16, 46,  4
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*USER ELEMENT,TYPE=us3,NODES=3,INTEGRATION POINTS=3,MAXDOF=6


*USER SECTION,ELSET=Eall,MATERIAL=Material-1,CONSTANTS=6
1.0

*Nset, nset=Set-1,
  8, 10, 11
*Nset, nset=Set-2,
 7,
*Nset, nset=Set-3,
 7,
*Nset, nset=Set-4,
  8, 10, 11, 34, 35, 36, 37, 38, 39
*Nset, nset=Set-5,
 7,
*Nset, nset=Set-6, instance=Part-1-1
  1,  4,  5,  6,  7, 12, 13, 14, 15


**
** MATERIALS
**
*Material, name=Material-1
*Density
1.,
*Elastic
1., 0.333333
** ----------------------------------------------------------------
**
** STEP: Step-1
**
*Step, name=Step-1, nlgeom=NO
*Static
1., 1., 1e-05, 1.
**
** BOUNDARY CONDITIONS
**
** Name: BC-2 Type: Displacement/Rotation
*Boundary
Set-4, 1, 1
Set-4, 2, 2
Set-4, 3, 3
Set-4, 4, 4
Set-4, 5, 5
Set-4, 6, 6
**
** LOADS
**
** Name: Load-4   Type: Concentrated force
*Cload
Set-6, 2, 0.111111

**
** OUTPUT REQUESTS
**
*NODE PRINT,NSET=Nall
U
*EL PRINT,ELSET=Eall
S
*EL FILE
SNEG,SMID,SPOS
*NODE FILE
U,RF

*End Step
