**
**  ccx umax = 1.385755E+00 -> umax/uref = 0.997
**  abq umax =     xxx      -> umax/uref = 0.996
**
** Refeference is presented in following paper:
** Technical Paper
** Published: 29 June 2018
** A three-node shell element based on the discrete shear gap and
** assumed natural deviatoric strain approaches
** Gil Rama, Dragan Marinkovic & Manfred Zehn
** Journal of the Brazilian Society of Mechanical Sciences and Engineering
** volume 40, Article number: 356 (2018)

**  t = 0,05 uref = 1,390
** Elemente   ccx abq S3
**      24  0.903 0.768
**      32  0.964 0.914
**      48  0.986 0.967
**      64  0.991 0.986
**      96  0.994 0.992
**     384  0.997 0.996  <- current .inp
**    1536  0.999 0.998

*
*Part, name=Part-1
*Node,Nset=Nall
      1,           0., -0.550000012,          12.
      2,           0.,           0.,          12.
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*Element, type=us3, ELSET=Eall
  1,   1,   7, 102
  2,   7, 152, 102
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*USER ELEMENT,TYPE=us3,NODES=3,INTEGRATION POINTS=3,MAXDOF=6


*USER SECTION,ELSET=Eall,MATERIAL=Material-1,CONSTANTS=1
0.05

*Nset, nset=Set-2,
   1,   2,   5,   7, 103

** MATERIALS
**
*Material, name=Material-1
*Density
7800.,
*Elastic
 2.9e+07, 0.22

*Step,
*Static
1., 1., 1e-05, 1.

*Boundary
Set-2, 1, 1
Set-2, 2, 2
Set-2, 3, 3
Set-2, 4, 4
Set-2, 5, 5
Set-2, 6, 6
**
** LOADS
**
** Name: Load-1   Type: Concentrated force
*Cload
3, 1, 1.

** ccx output
*NODE PRINT,NSET=Nall
U
*EL FILE
SNEG,SMID,SPOS
*EL PRINT,ELSET=Eall
S
*NODE FILE
U,RF
*end step

**U,RF,SNEG,SMID,SPOS
