>**
**   Structure: cantilever beam.
**   Test objective: sensitivity analysis of the stress
**                   in a simply supported beam subject to
**                   a point force in the middle;
**                   this file is part of an optimization exercise
**                   consisting of files opt1.inp,opt1.f,opt2.inp,
**                   opt2.f and opt3.inp (cf. User's manual).
**
*HEADING
Model: beam     Date: 10-Mar-1998
*NODE
     1,      0.000000,      0.000000,      0.000000
     2,      1.000000,      0.000000,      0.000000
     3,      1.000000,      1.000000,      0.000000
     4,      0.000000,      1.000000,      0.000000
     5,      0.000000,      0.000000,      8.000000
     6,      1.000000,      0.000000,      8.000000
     7,      1.000000,      1.000000,      8.000000
     8,      0.000000,      1.000000,      8.000000
     9,      0.250000,      0.000000,      0.000000
    10,      0.500000,      0.000000,      0.000000
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*ELEMENT, TYPE=C3D20R   , ELSET=Eall
     1,     1,    10,    95,    19,    61,   105,   222,   192,     9,    93,
           94,    20,   104,   220,   221,   193,    62,   103,   219,   190
     2,    10,     2,    13,    95,   105,    34,   134,   222,    11,    12,
           96,    93,   106,   133,   223,   220,   103,    33,   132,   219
     3,    19,    95,    16,     4,   192,   222,   163,    79,    94,    97,
           17,    18,   221,   224,   164,   191,   190,   219,   161,    78
     4,    95,    13,     3,    16,   222,   134,    64,   163,    96,    14,
           15,    97,   223,   135,   162,   224,   219,   132,    63,   161
     5,    61,   105,   222,   192,    59,   109,   228,   196,   104,   220,
          221,   193,   108,   226,   227,   197,    60,   107,   225,   194
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*NSET,NSET=DESIGNNODES
1,
2,
5,
6,
9,
10,
11,
12,
20,
21,
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*DESIGNVARIABLES,TYPE=COORDINATE
DESIGNNODES
*MATERIAL,NAME=HY
*DEFORMATION PLASTICITY
190000.,.34,50.,12.,0.45
*DENSITY
7.8E-9
*SOLID SECTION,ELSET=Eall,MATERIAL=HY
*STEP
*STATIC
*BOUNDARY
3,1,3
4,2,3
7,1,2
8,2,2
*CLOAD
117,2,10.
*NODE FILE
U
*EL FILE,FREQUENCY=10
S,PEEQ,NOE
*END STEP
*STEP
*SENSITIVITY
*DESIGN RESPONSE, NAME=PEEQ_RESP
EQUIVALENT PLASTIC STRAIN,DESIGNNODES,10.,0.02
*DESIGN RESPONSE, NAME=MASS_RESP
MASS,Eall
*FILTER,TYPE=EXPLICIT,EDGE PRESERVATION=YES,DIRECTION WEIGHTING=YES
3.
*NODE FILE
SEN
*END STEP
*STEP
*FEASIBLE DIRECTION,METHOD=GRADIENT PROJECTION
0.01
*OBJECTIVE,TARGET=MIN
PEEQ_RESP
*CONSTRAINT
MASS_RESP,LE,1.,
*NODE FILE
SEN
*END STEP
