*NODE,NSET=Nall
         1, 0.00000000E+00, 0.00000000E+00, 0.00000000E+00
         2, 0.10000000E+01, 0.00000000E+00, 0.00000000E+00
         3, 0.10000000E+01, 0.10000000E+01, 0.00000000E+00
         4, 0.00000000E+00, 0.10000000E+01, 0.00000000E+00
         5, 0.00000000E+00, 0.00000000E+00, 0.80000000E+01
         6, 0.10000000E+01, 0.00000000E+00, 0.80000000E+01
         7, 0.10000000E+01, 0.10000000E+01, 0.80000000E+01
         8, 0.00000000E+00, 0.10000000E+01, 0.80000000E+01
         9, 0.25000000E+00, 0.00000000E+00, 0.00000000E+00
        10, 0.50000000E+00, 0.00000000E+00, 0.00000000E+00
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*ELEMENT,TYPE=C3D20
         1,         1,        10,        95,        19,        61,       105,       222,       192,         9,        93,        94,        20,       104,       220,       221,
       193,        62,       103,       219,       190,
*ELEMENT,TYPE=C3D20
         2,        10,         2,        13,        95,       105,        34,       134,       222,        11,        12,        96,        93,       106,       133,       223,
       220,       103,        33,       132,       219,
*ELEMENT,TYPE=C3D20
         3,        19,        95,        16,         4,       192,       222,       163,        79,        94,        97,        17,        18,       221,       224,       164,
       191,       190,       219,       161,        78,
*ELEMENT,TYPE=C3D20
         4,        95,        13,         3,        16,       222,       134,        64,       163,        96,        14,        15,        97,       223,       135,       162,
       224,       219,       132,        63,       161,
*ELEMENT,TYPE=C3D20
         5,        61,       105,       222,       192,        59,       109,       228,       196,       104,       220,       221,       193,       108,       226,       227,
       197,        60,       107,       225,       194,
*ELEMENT,TYPE=C3D20
         6,       105,        34,       134,       222,       109,        36,       138,       228,       106,       133,       223,       220,       110,       137,       229,
       226,       107,        35,       136,       225,
*ELEMENT,TYPE=C3D20
         7,       192,       222,       163,        79,       196,       228,       167,        81,       221,       224,       164,       191,       227,       230,       168,
       195,       194,       225,       165,        80,
*ELEMENT,TYPE=C3D20
         8,       222,       134,        64,       163,       228,       138,        66,       167,       223,       135,       162,       224,       229,       139,       166,
       230,       225,       136,        65,       165,
*ELEMENT,TYPE=C3D20
         9,        59,       109,       228,       196,        57,       113,       234,       200,       108,       226,       227,       197,       112,       232,       233,
       201,        58,       111,       231,       198,
*ELEMENT,TYPE=C3D20
        10,       109,        36,       138,       228,       113,        38,       142,       234,       110,       137,       229,       226,       114,       141,       235,
       232,       111,        37,       140,       231,
*ELEMENT,TYPE=C3D20
        11,       196,       228,       167,        81,       200,       234,       171,        83,       227,       230,       168,       195,       233,       236,       172,
       199,       198,       231,       169,        82,
*ELEMENT,TYPE=C3D20
        12,       228,       138,        66,       167,       234,       142,        68,       171,       229,       139,       166,       230,       235,       143,       170,
       236,       231,       140,        67,       169,
*ELEMENT,TYPE=C3D20
        13,        57,       113,       234,       200,        55,       117,       240,       204,       112,       232,       233,       201,       116,       238,       239,
       205,        56,       115,       237,       202,
*ELEMENT,TYPE=C3D20
        14,       113,        38,       142,       234,       117,        40,       146,       240,       114,       141,       235,       232,       118,       145,       241,
       238,       115,        39,       144,       237,
*ELEMENT,TYPE=C3D20
        15,       200,       234,       171,        83,       204,       240,       175,        85,       233,       236,       172,       199,       239,       242,       176,
       203,       202,       237,       173,        84,
*ELEMENT,TYPE=C3D20
        16,       234,       142,        68,       171,       240,       146,        70,       175,       235,       143,       170,       236,       241,       147,       174,
       242,       237,       144,        69,       173,
*ELEMENT,TYPE=C3D20
        17,        55,       117,       240,       204,        53,       121,       246,       208,       116,       238,       239,       205,       120,       244,       245,
       209,        54,       119,       243,       206,
*ELEMENT,TYPE=C3D20
        18,       117,        40,       146,       240,       121,        42,       150,       246,       118,       145,       241,       238,       122,       149,       247,
       244,       119,        41,       148,       243,
*ELEMENT,TYPE=C3D20
        19,       204,       240,       175,        85,       208,       246,       179,        87,       239,       242,       176,       203,       245,       248,       180,
       207,       206,       243,       177,        86,
*ELEMENT,TYPE=C3D20
        20,       240,       146,        70,       175,       246,       150,        72,       179,       241,       147,       174,       242,       247,       151,       178,
       248,       243,       148,        71,       177,
*ELEMENT,TYPE=C3D20
        21,        53,       121,       246,       208,        51,       125,       252,       212,       120,       244,       245,       209,       124,       250,       251,
       213,        52,       123,       249,       210,
*ELEMENT,TYPE=C3D20
        22,       121,        42,       150,       246,       125,        44,       154,       252,       122,       149,       247,       244,       126,       153,       253,
       250,       123,        43,       152,       249,
*ELEMENT,TYPE=C3D20
        23,       208,       246,       179,        87,       212,       252,       183,        89,       245,       248,       180,       207,       251,       254,       184,
       211,       210,       249,       181,        88,
*ELEMENT,TYPE=C3D20
        24,       246,       150,        72,       179,       252,       154,        74,       183,       247,       151,       178,       248,       253,       155,       182,
       254,       249,       152,        73,       181,
*ELEMENT,TYPE=C3D20
        25,        51,       125,       252,       212,        49,       129,       258,       216,       124,       250,       251,       213,       128,       256,       257,
       217,        50,       127,       255,       214,
*ELEMENT,TYPE=C3D20
        26,       125,        44,       154,       252,       129,        46,       158,       258,       126,       153,       253,       250,       130,       157,       259,
       256,       127,        45,       156,       255,
*ELEMENT,TYPE=C3D20
        27,       212,       252,       183,        89,       216,       258,       187,        91,       251,       254,       184,       211,       257,       260,       188,
       215,       214,       255,       185,        90,
*ELEMENT,TYPE=C3D20
        28,       252,       154,        74,       183,       258,       158,        76,       187,       253,       155,       182,       254,       259,       159,       186,
       260,       255,       156,        75,       185,
*ELEMENT,TYPE=C3D20
        29,        49,       129,       258,       216,         5,        22,       100,        31,       128,       256,       257,       217,        21,        98,        99,
        32,        48,       131,       261,       218,
*ELEMENT,TYPE=C3D20
        30,       129,        46,       158,       258,        22,         6,        25,       100,       130,       157,       259,       256,        23,        24,       101,
        98,       131,        47,       160,       261,
*ELEMENT,TYPE=C3D20
        31,       216,       258,       187,        91,        31,       100,        28,         8,       257,       260,       188,       215,        99,       102,        29,
        30,       218,       261,       189,        92,
*ELEMENT,TYPE=C3D20
        32,       258,       158,        76,       187,       100,        25,         7,        28,       259,       159,       186,       260,       101,        26,        27,
       102,       261,       160,        77,       189,
*ELSET,ELSET=         1E
*MATERIAL,NAME=         1M
*ELASTIC
 0.10000000E+01,0.3
*SOLID SECTION,ELSET=         1E,MATERIAL=         1M
*ELSET,ELSET=         2E
*MATERIAL,NAME=         2M
*ELASTIC
 0.95000000E+00,0.3
*SOLID SECTION,ELSET=         2E,MATERIAL=         2M
*ELSET,ELSET=         3E
*MATERIAL,NAME=         3M
*ELASTIC
 0.90000000E+00,0.3
*SOLID SECTION,ELSET=         3E,MATERIAL=         3M
*ELSET,ELSET=         4E
*MATERIAL,NAME=         4M
*ELASTIC
 0.85000000E+00,0.3
*SOLID SECTION,ELSET=         4E,MATERIAL=         4M
*ELSET,ELSET=         5E
*MATERIAL,NAME=         5M
*ELASTIC
 0.80000000E+00,0.3
*SOLID SECTION,ELSET=         5E,MATERIAL=         5M
*ELSET,ELSET=         6E
*MATERIAL,NAME=         6M
*ELASTIC
 0.75000000E+00,0.3
*SOLID SECTION,ELSET=         6E,MATERIAL=         6M
*ELSET,ELSET=         7E
*MATERIAL,NAME=         7M
*ELASTIC
 0.70000000E+00,0.3
*SOLID SECTION,ELSET=         7E,MATERIAL=         7M
*ELSET,ELSET=         8E
*MATERIAL,NAME=         8M
*ELASTIC
 0.65000000E+00,0.3
*SOLID SECTION,ELSET=         8E,MATERIAL=         8M
*ELSET,ELSET=         9E
*MATERIAL,NAME=         9M
*ELASTIC
 0.60000000E+00,0.3
*SOLID SECTION,ELSET=         9E,MATERIAL=         9M
*ELSET,ELSET=        10E
        32,
        31,
        30,
        29,
        28,
        27,
        26,
        25,
        24,
        23,
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*MATERIAL,NAME=        10M
*ELASTIC
 0.55000000E+00,0.3
*SOLID SECTION,ELSET=        10E,MATERIAL=        10M
*EQUATION
1
         3,1,1,
1
         3,2,1,
1
         3,3,1,
1
         4,1,1,
1
         4,2,1,
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*NODE
       262,0.,0.,0.
       263,0.,0.,0.
       264,0.,0.,0.
       265,0.,0.,0.
       266,0.,0.,0.
       267,0.,0.,0.
       268,0.,0.,0.
       269,0.,0.,0.
       270,0.,0.,0.
       271,0.,0.,0.
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*EQUATION
4
         1,2,-0.5773502691896E+00,         1,3,-0.5773502691896E+00,         1,1,-0.5773502691896E+00,       262,1,-1.
*BOUNDARY
       262,1,1,-0.5531284946973E-01
*EQUATION
4
         2,2,-0.5773502691896E+00,         2,3,-0.5773502691896E+00,         2,1, 0.5773502691896E+00,       263,1,-1.
*BOUNDARY
       263,1,1,-0.5524866414684E-01
*EQUATION
4
         5,2,-0.5773502691896E+00,         5,3, 0.5773502691896E+00,         5,1,-0.5773502691896E+00,       264,1,-1.
*BOUNDARY
       264,1,1,-0.5532370063083E-01
*EQUATION
4
         6,2,-0.5773502691896E+00,         6,3, 0.5773502691896E+00,         6,1, 0.5773502691896E+00,       265,1,-1.
*BOUNDARY
       265,1,1,-0.5530938314294E-01
*EQUATION
4
         9,2,-0.7071067811865E+00,         9,3,-0.7071067811865E+00,         9,1, 0.0000000000000E+00,       266,1,-1.
*BOUNDARY
       266,1,1,-0.4038002991941E-01
*EQUATION
4
        10,2,-0.7071067811865E+00,        10,3,-0.7071067811865E+00,        10,1, 0.0000000000000E+00,       267,1,-1.
*BOUNDARY
       267,1,1,-0.4001210177697E-01
*EQUATION
4
        11,2,-0.7071067811865E+00,        11,3,-0.7071067811865E+00,        11,1, 0.0000000000000E+00,       268,1,-1.
*BOUNDARY
       268,1,1,-0.4037978808826E-01
*EQUATION
4
        12,1, 0.7071067811865E+00,        12,3,-0.7071067811865E+00,        12,2, 0.0000000000000E+00,       269,1,-1.
*BOUNDARY
       269,1,1,-0.4929641115730E-01
*EQUATION
4
        20,1,-0.7071067811865E+00,        20,3,-0.7071067811865E+00,        20,2, 0.0000000000000E+00,       270,1,-1.
*BOUNDARY
       270,1,1,-0.4939895416958E-01
*EQUATION
4
        21,2,-0.7071067811865E+00,        21,3, 0.7071067811865E+00,        21,1, 0.0000000000000E+00,       271,1,-1.
*BOUNDARY
       271,1,1,-0.4039275403622E-01
*EQUATION
4
        22,2,-0.7071067811865E+00,        22,3, 0.7071067811865E+00,        22,1, 0.0000000000000E+00,       272,1,-1.
*BOUNDARY
       272,1,1,-0.4002647467083E-01
*EQUATION
4
        23,2,-0.7071067811865E+00,        23,3, 0.7071067811865E+00,        23,1, 0.0000000000000E+00,       273,1,-1.
*BOUNDARY
       273,1,1,-0.4039617507840E-01
*EQUATION
4
        24,1, 0.7071067811865E+00,        24,3, 0.7071067811865E+00,        24,2, 0.0000000000000E+00,       274,1,-1.
*BOUNDARY
       274,1,1,-0.4937240198156E-01
*EQUATION
4
        32,1,-0.7071067811865E+00,        32,3, 0.7071067811865E+00,        32,2, 0.0000000000000E+00,       275,1,-1.
*BOUNDARY
       275,1,1,-0.4944757965609E-01
*EQUATION
4
        33,1, 0.7071067811865E+00,        33,2,-0.7071067811865E+00,        33,3, 0.0000000000000E+00,       276,1,-1.
*BOUNDARY
       276,1,1,-0.5104759463327E-01
*EQUATION
4
        34,1, 0.7071067811865E+00,        34,2,-0.7071067811865E+00,        34,3, 0.0000000000000E+00,       277,1,-1.
*BOUNDARY
       277,1,1,-0.3540843823461E-01
*EQUATION
4
        35,1, 0.7071067811865E+00,        35,2,-0.7071067811865E+00,        35,3, 0.0000000000000E+00,       278,1,-1.
*BOUNDARY
       278,1,1,-0.1840319802870E-01
*EQUATION
4
        36,1, 0.7071067811865E+00,        36,2,-0.7071067811865E+00,        36,3, 0.0000000000000E+00,       279,1,-1.
*BOUNDARY
       279,1,1, 0.3364678201171E-02
*EQUATION
4
        37,1, 0.7071067811865E+00,        37,2,-0.7071067811865E+00,        37,3, 0.0000000000000E+00,       280,1,-1.
*BOUNDARY
       280,1,1, 0.2504550615335E-01
*EQUATION
4
        38,1, 0.7071067811865E+00,        38,2,-0.7071067811865E+00,        38,3, 0.0000000000000E+00,       281,1,-1.
*BOUNDARY
       281,1,1, 0.4564974669896E-01
*EQUATION
4
        39,1, 0.7071067811865E+00,        39,2,-0.7071067811865E+00,        39,3, 0.0000000000000E+00,       282,1,-1.
*BOUNDARY
       282,1,1, 0.6269490555575E-01
*EQUATION
4
        40,1, 0.7071067811865E+00,        40,2,-0.7071067811865E+00,        40,3, 0.0000000000000E+00,       283,1,-1.
*BOUNDARY
       283,1,1, 0.6678865872010E-01
*EQUATION
4
        41,1, 0.7071067811865E+00,        41,2,-0.7071067811865E+00,        41,3, 0.0000000000000E+00,       284,1,-1.
*BOUNDARY
       284,1,1, 0.6268297162529E-01
*EQUATION
4
        42,1, 0.7071067811865E+00,        42,2,-0.7071067811865E+00,        42,3, 0.0000000000000E+00,       285,1,-1.
*BOUNDARY
       285,1,1, 0.4562586843925E-01
*EQUATION
4
        43,1, 0.7071067811865E+00,        43,2,-0.7071067811865E+00,        43,3, 0.0000000000000E+00,       286,1,-1.
*BOUNDARY
       286,1,1, 0.2501036611019E-01
*EQUATION
4
        44,1, 0.7071067811865E+00,        44,2,-0.7071067811865E+00,        44,3, 0.0000000000000E+00,       287,1,-1.
*BOUNDARY
       287,1,1, 0.3320865816652E-02
*EQUATION
4
        45,1, 0.7071067811865E+00,        45,2,-0.7071067811865E+00,        45,3, 0.0000000000000E+00,       288,1,-1.
*BOUNDARY
       288,1,1,-0.1845601089975E-01
*EQUATION
4
        46,1, 0.7071067811865E+00,        46,2,-0.7071067811865E+00,        46,3, 0.0000000000000E+00,       289,1,-1.
*BOUNDARY
       289,1,1,-0.3546741454453E-01
*EQUATION
4
        47,1, 0.7071067811865E+00,        47,2,-0.7071067811865E+00,        47,3, 0.0000000000000E+00,       290,1,-1.
*BOUNDARY
       290,1,1,-0.5111297914603E-01
*EQUATION
4
        48,1,-0.7071067811865E+00,        48,2,-0.7071067811865E+00,        48,3, 0.0000000000000E+00,       291,1,-1.
*BOUNDARY
       291,1,1,-0.5111538766586E-01
*EQUATION
4
        49,1,-0.7071067811865E+00,        49,2,-0.7071067811865E+00,        49,3, 0.0000000000000E+00,       292,1,-1.
*BOUNDARY
       292,1,1,-0.3544850951446E-01
*EQUATION
4
        50,1,-0.7071067811865E+00,        50,2,-0.7071067811865E+00,        50,3, 0.0000000000000E+00,       293,1,-1.
*BOUNDARY
       293,1,1,-0.1841718286682E-01
*EQUATION
4
        51,1,-0.7071067811865E+00,        51,2,-0.7071067811865E+00,        51,3, 0.0000000000000E+00,       294,1,-1.
*BOUNDARY
       294,1,1, 0.3382756850891E-02
*EQUATION
4
        52,1,-0.7071067811865E+00,        52,2,-0.7071067811865E+00,        52,3, 0.0000000000000E+00,       295,1,-1.
*BOUNDARY
       295,1,1, 0.2509572938570E-01
*EQUATION
4
        53,1,-0.7071067811865E+00,        53,2,-0.7071067811865E+00,        53,3, 0.0000000000000E+00,       296,1,-1.
*BOUNDARY
       296,1,1, 0.4572818170250E-01
*EQUATION
4
        54,1,-0.7071067811865E+00,        54,2,-0.7071067811865E+00,        54,3, 0.0000000000000E+00,       297,1,-1.
*BOUNDARY
       297,1,1, 0.6280068730382E-01
*EQUATION
4
        55,1,-0.7071067811865E+00,        55,2,-0.7071067811865E+00,        55,3, 0.0000000000000E+00,       298,1,-1.
*BOUNDARY
       298,1,1, 0.6690020135036E-01
*EQUATION
4
        56,1,-0.7071067811865E+00,        56,2,-0.7071067811865E+00,        56,3, 0.0000000000000E+00,       299,1,-1.
*BOUNDARY
       299,1,1, 0.6279565650863E-01
*EQUATION
4
        57,1,-0.7071067811865E+00,        57,2,-0.7071067811865E+00,        57,3, 0.0000000000000E+00,       300,1,-1.
*BOUNDARY
       300,1,1, 0.4572091048684E-01
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*BOUNDARY
       301,1,1, 0.2508699841787E-01
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*BOUNDARY
       302,1,1, 0.3376134190116E-02
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*BOUNDARY
       303,1,1,-0.1842127810704E-01
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*BOUNDARY
       304,1,1,-0.3544767770467E-01
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*BOUNDARY
       305,1,1,-0.5110951898469E-01
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*BOUNDARY
       306,1,1,-0.5165991501001E-01
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*BOUNDARY
       307,1,1,-0.3933925561231E-01
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*BOUNDARY
       308,1,1,-0.2564096484426E-01
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*BOUNDARY
       309,1,1,-0.7628469330985E-02
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*BOUNDARY
       310,1,1, 0.1027664589473E-01
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*BOUNDARY
       311,1,1, 0.2727514510210E-01
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*BOUNDARY
       312,1,1, 0.4159505772500E-01
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*BOUNDARY
       313,1,1, 0.4514004578328E-01
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*BOUNDARY
       314,1,1, 0.4151100877945E-01
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*BOUNDARY
       315,1,1, 0.2711891126369E-01
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*BOUNDARY
       316,1,1, 0.1006199943383E-01
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*BOUNDARY
       317,1,1,-0.7877469260142E-02
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*BOUNDARY
       318,1,1,-0.2591613278073E-01
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*BOUNDARY
       319,1,1,-0.3962082898310E-01
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*BOUNDARY
       320,1,1,-0.5194180320049E-01
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*BOUNDARY
       321,1,1,-0.5179764292740E-01
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*BOUNDARY
       322,1,1,-0.3949425731262E-01
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*BOUNDARY
       323,1,1,-0.2581088877099E-01
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*BOUNDARY
       324,1,1,-0.7816044359089E-02
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*BOUNDARY
       325,1,1, 0.1007028781026E-01
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*BOUNDARY
       326,1,1, 0.2705354111088E-01
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*BOUNDARY
       327,1,1, 0.4135815797266E-01
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*BOUNDARY
       328,1,1, 0.4490194573826E-01
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*BOUNDARY
       329,1,1, 0.4127109158456E-01
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*BOUNDARY
       330,1,1, 0.2689136434417E-01
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*BOUNDARY
       331,1,1, 0.9846123337938E-02
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*BOUNDARY
       332,1,1,-0.8076090186074E-02
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*BOUNDARY
       333,1,1,-0.2610029442386E-01
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*BOUNDARY
       334,1,1,-0.3979131446070E-01
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*BOUNDARY
       335,1,1,-0.5209771758084E-01
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*BOUNDARY
       336,1,1,-0.1625522525678E-01
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*BOUNDARY
       337,1,1,-0.1626499606938E-01
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*BOUNDARY
       338,1,1,-0.3025960336293E-01
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*BOUNDARY
       339,1,1,-0.1318654236347E-01
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*BOUNDARY
       340,1,1,-0.1285274858705E-01
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*BOUNDARY
       341,1,1,-0.1319177550110E-01
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*BOUNDARY
       342,1,1, 0.6558064714961E-02
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*BOUNDARY
       343,1,1, 0.3016072946771E-01
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*BOUNDARY
       344,1,1, 0.3021711737434E-01
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*BOUNDARY
       345,1,1, 0.3014966963200E-01
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*BOUNDARY
       346,1,1, 0.5440854164400E-01
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*BOUNDARY
       347,1,1, 0.7701991252341E-01
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*BOUNDARY
       348,1,1, 0.7660667769027E-01
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*BOUNDARY
       349,1,1, 0.7700236299951E-01
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*BOUNDARY
       350,1,1, 0.9558704795470E-01
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*BOUNDARY
       351,1,1, 0.1000000000000E+00
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*BOUNDARY
       352,1,1, 0.9937704481068E-01
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*BOUNDARY
       353,1,1, 0.9997837110063E-01
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*BOUNDARY
       354,1,1, 0.9559387802932E-01
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*BOUNDARY
       355,1,1, 0.7703212877607E-01
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*BOUNDARY
       356,1,1, 0.7661749121439E-01
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*BOUNDARY
       357,1,1, 0.7701210807019E-01
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*BOUNDARY
       358,1,1, 0.5442090370857E-01
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*BOUNDARY
       359,1,1, 0.3017360616609E-01
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*BOUNDARY
       360,1,1, 0.3022790478760E-01
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*BOUNDARY
       361,1,1, 0.3015858661892E-01
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*BOUNDARY
       362,1,1, 0.6565169285917E-02
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*BOUNDARY
       363,1,1,-0.1318280107435E-01
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*BOUNDARY
       364,1,1,-0.1285126220877E-01
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*BOUNDARY
       365,1,1,-0.1319266214220E-01
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*BOUNDARY
       366,1,1,-0.3026478005288E-01
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*BOUNDARY
       367,1,1,-0.5394010916759E-01
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*BOUNDARY
       368,1,1,-0.4612271441857E-01
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*BOUNDARY
       369,1,1,-0.4588020277453E-01
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*BOUNDARY
       370,1,1,-0.4626100575719E-01
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*BOUNDARY
       371,1,1,-0.3833614738261E-01
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*BOUNDARY
       372,1,1,-0.2690054707487E-01
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*BOUNDARY
       373,1,1,-0.2683519360827E-01
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*BOUNDARY
       374,1,1,-0.2710707054531E-01
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*BOUNDARY
       375,1,1,-0.1639875726565E-01
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*BOUNDARY
       376,1,1,-0.5653261880291E-02
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*BOUNDARY
       377,1,1,-0.5864990686595E-02
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*BOUNDARY
       378,1,1,-0.5938073505428E-02
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*BOUNDARY
       379,1,1, 0.2872821323927E-02
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*BOUNDARY
       380,1,1, 0.5302074668882E-02
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*BOUNDARY
       381,1,1, 0.4927099149997E-02
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*BOUNDARY
       382,1,1, 0.4930369691966E-02
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*BOUNDARY
       383,1,1, 0.2847068988357E-02
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*BOUNDARY
       384,1,1,-0.5701127998163E-02
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*BOUNDARY
       385,1,1,-0.5912964217019E-02
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*BOUNDARY
       386,1,1,-0.5986630643919E-02
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*BOUNDARY
       387,1,1,-0.1646683031429E-01
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*BOUNDARY
       388,1,1,-0.2698028710724E-01
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*BOUNDARY
       389,1,1,-0.2691514203594E-01
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*BOUNDARY
       390,1,1,-0.2718797369322E-01
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*BOUNDARY
       391,1,1,-0.3842698643610E-01
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*BOUNDARY
       392,1,1,-0.4621756750161E-01
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*BOUNDARY
       393,1,1,-0.4597540539248E-01
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*BOUNDARY
       394,1,1,-0.4635734951272E-01
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*BOUNDARY
       395,1,1,-0.5403879609581E-01
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*BOUNDARY
       396,1,1,-0.3101665070648E-01
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*BOUNDARY
       397,1,1,-0.1854401812081E-01
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*BOUNDARY
       398,1,1,-0.1824375951085E-01
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*BOUNDARY
       399,1,1,-0.1855221831100E-01
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*BOUNDARY
       400,1,1,-0.3645682841257E-02
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*BOUNDARY
       401,1,1, 0.1469627464612E-01
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*BOUNDARY
       402,1,1, 0.1477604760831E-01
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*BOUNDARY
       403,1,1, 0.1468249252320E-01
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*BOUNDARY
       404,1,1, 0.3360130490144E-01
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*BOUNDARY
       405,1,1, 0.5109109326899E-01
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*BOUNDARY
       406,1,1, 0.5078791323381E-01
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*BOUNDARY
       407,1,1, 0.5107099994912E-01
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*BOUNDARY
       408,1,1, 0.6589094546232E-01
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*BOUNDARY
       409,1,1, 0.6944895845300E-01
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*BOUNDARY
       410,1,1, 0.6896935748059E-01
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*BOUNDARY
       411,1,1, 0.6942493435058E-01
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*BOUNDARY
       412,1,1, 0.6578375123918E-01
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*BOUNDARY
       413,1,1, 0.5089249439921E-01
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*BOUNDARY
       414,1,1, 0.5058912669183E-01
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*BOUNDARY
       415,1,1, 0.5086990159909E-01
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*BOUNDARY
       416,1,1, 0.3332772078974E-01
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*BOUNDARY
       417,1,1, 0.1437962107282E-01
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*BOUNDARY
       418,1,1, 0.1445890359510E-01
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*BOUNDARY
       419,1,1, 0.1436170029378E-01
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*BOUNDARY
       420,1,1,-0.3997072170368E-02
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*BOUNDARY
       421,1,1,-0.1890098511097E-01
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*BOUNDARY
       422,1,1,-0.1860205793496E-01
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*BOUNDARY
       423,1,1,-0.1891472069113E-01
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*BOUNDARY
       424,1,1,-0.3137501819058E-01
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*BOUNDARY
       425,1,1,-0.5407994877275E-01
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*BOUNDARY
       426,1,1,-0.4640447405710E-01
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*BOUNDARY
       427,1,1,-0.4601608125213E-01
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*BOUNDARY
       428,1,1,-0.4625214027122E-01
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*BOUNDARY
       429,1,1,-0.3846788028012E-01
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*BOUNDARY
       430,1,1,-0.2724301473964E-01
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*BOUNDARY
       431,1,1,-0.2695805846438E-01
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*BOUNDARY
       432,1,1,-0.2701123918588E-01
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*BOUNDARY
       433,1,1,-0.1651379389322E-01
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*BOUNDARY
       434,1,1,-0.6062053977652E-02
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*BOUNDARY
       435,1,1,-0.5969799239998E-02
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*BOUNDARY
       436,1,1,-0.5739424081987E-02
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*BOUNDARY
       437,1,1, 0.2777562056826E-02
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*BOUNDARY
       438,1,1, 0.4819482468653E-02
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*BOUNDARY
       439,1,1, 0.4839223124733E-02
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*BOUNDARY
       440,1,1, 0.5236940709904E-02
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*BOUNDARY
       441,1,1, 0.2761756140429E-02
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*BOUNDARY
       442,1,1,-0.6094931642212E-02
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*BOUNDARY
       443,1,1,-0.5999786726733E-02
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*BOUNDARY
       444,1,1,-0.5766779063928E-02
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*BOUNDARY
       445,1,1,-0.1655725567142E-01
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*BOUNDARY
       446,1,1,-0.2729935684480E-01
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*BOUNDARY
       447,1,1,-0.2700968602736E-01
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*BOUNDARY
       448,1,1,-0.2705862137090E-01
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*BOUNDARY
       449,1,1,-0.3852768186562E-01
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*BOUNDARY
       450,1,1,-0.4647435364746E-01
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*BOUNDARY
       451,1,1,-0.4608007437015E-01
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*BOUNDARY
       452,1,1,-0.4631090650733E-01
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*BOUNDARY
       453,1,1,-0.5414776753957E-01
*STEP
*STATIC
*NODE FILE
U
*END STEP
