**
**   Structure: 2d incompressible Poiseulle flow
**   Test objective: CFD Finite Element Method (CBS)
**   Analytical solution: max velocity 1.5
**   (solution is really laminar, Re=1).
**
*NODE, NSET=Nall
       1,0.000000000000e+00,0.000000000000e+00,1.000000000000e-01
       2,0.000000000000e+00,1.000000000000e-01,1.000000000000e-01
       3,6.000000000000e-01,1.000000000000e-01,1.000000000000e-01
       4,6.000000000000e-01,0.000000000000e+00,1.000000000000e-01
       5,0.000000000000e+00,0.000000000000e+00,0.000000000000e+00
       6,0.000000000000e+00,1.000000000000e-01,0.000000000000e+00
       7,6.000000000000e-01,1.000000000000e-01,0.000000000000e+00
       8,6.000000000000e-01,0.000000000000e+00,0.000000000000e+00
       9,1.200000000000e+00,1.000000000000e-01,1.000000000000e-01
      10,1.200000000000e+00,0.000000000000e+00,1.000000000000e-01
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*ELEMENT, TYPE=F3D8, ELSET=Eall
     1,     1,     2,     3,     4,     5,     6,     7,     8
     2,     4,     3,     9,    10,     8,     7,    11,    12
     3,    10,     9,    13,    14,    12,    11,    15,    16
     4,    14,    13,    17,    18,    16,    15,    19,    20
     5,    18,    17,    21,    22,    20,    19,    23,    24
     6,    22,    21,    25,    26,    24,    23,    27,    28
     7,    26,    25,    29,    30,    28,    27,    31,    32
     8,    30,    29,    33,    34,    32,    31,    35,    36
     9,    34,    33,    37,    38,    36,    35,    39,    40
    10,    38,    37,    41,    42,    40,    39,    43,    44
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** Names based on wall
*NSET,NSET=SOLIDSURFACE
4,
8,
10,
12,
14,
16,
18,
20,
22,
24,
26,
28,
30,
32,
34,
36,
38,
40,
42,
44,
** Names based on unitvel
*NSET,NSET=SOLIDSURFACE
222,
224,
225,
226,
227,
228,
229,
230,
231,
232,
233,
234,
235,
236,
237,
238,
239,
240,
241,
242,
** Names based on in
*NSET,NSET=Nin
2,
6,
45,
47,
67,
69,
89,
91,
111,
113,
133,
135,
155,
157,
177,
179,
199,
201,
1,5,221,223
*MATERIAL,NAME=WATER
*DENSITY
1.
*FLUID CONSTANTS
1.,1.
*CONDUCTIVITY
1.
*SOLID SECTION,ELSET=Eall,MATERIAL=WATER
*INITIAL CONDITIONS,TYPE=FLUID VELOCITY
Nall,1,0.
Nall,2,0.
Nall,3,0.
*INITIAL CONDITIONS,TYPE=PRESSURE
Nall,1.
*INITIAL CONDITIONS,TYPE=TEMPERATURE
Nall,0.
*VALUES AT INFINITY
0.,1.,1.,1.,1.
*NSET,NSET=Nout
41,43,65,66,87,88,109,110,131,132,153,154,175,176,
197,198,219,220
*NSET,NSET=FREESTREAM SURFACE
Nin,Nout
*STEP,INCF=1000
*CFD,STEADY STATE,TURBULENCE MODEL=SST
1.,1.,,,
*BOUNDARY
Nall,3,3,0.
SOLIDSURFACE,1,2,0.
Nin,1,1,1.
Nin,2,2,0.
Nout,8,8,1.
SOLIDSURFACE,11,11,0.
Nin,11,11,0.
*NODE FILE,FREQUENCYF=1000,NSET=Nall
VF,PSF,TSF,TURB,SVF
*END STEP
