**
**   Structure: cantilever beam.
**   Test objective: Johnson-Cook, explicit dynamics, C3D8R.
**
*Node
      1,        43.75,           0.,         0.75
      2,     43.74506,  0.711005688,         0.75
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*Element, type=C3D8R
  1,  229,  230,  344,  343,    1,    2,  116,  115
  2,  230,  231,  345,  344,    2,    3,  117,  116
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*Nset, nset=set2, generate
    1,  2052,     1
*Elset, elset=set2, generate
   1,  904,    1
*Solid Section, elset=set2, material=johnsoncooksteel
*Nset, nset=set5, generate
    1,  1939,   114
*Elset, elset=set5, generate
   1,  792,  113
*Nset, nset=set6, generate
  114,  2052,   114
*Elset, elset=set6, generate
 113,  904,  113
*Nset, nset=set7,
    1,    2,    3,    4,    5,    6
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*Elset, elset=set7, generate
   1,  904,    1
*Elset, elset=_PickedSurf4_S2, generate
   1,  113,    1
*Surface, type=ELEMENT, name=PickedSurf4,
_PickedSurf4_S2, S2
*Amplitude, name="Druckkurve1820mm von DDT", time=TOTAL TIME
0.0,140.,0.000125,80.
*MATERIAL,NAME=JOHNSONCOOKSTEEL
*ELASTIC
200000.,.35
*PLASTIC,HARDENING=JOHNSON COOK
240.,1220.,.66,0.77
*RATE DEPENDENT,TYPE=JOHNSON COOK
0.0298,1.
*DENSITY
7.85e-09
*ELSET,ELSET=E1
1,114,227,340,453,566,679,792
*Step, nlgeom, inc=100000000
*dynamic, explicit
1e-6, 0.00001
*Boundary
set6, 1 , 1
*Boundary
set5, 2 , 2
*Boundary
set7, 3 , 3
*Dsload, amplitude="Druckkurve1820mm von DDT"
PickedSurf4, P, 1
*el PRINT, frequency=10000,ELSET=E1
peeq
*endstep
