**
**   Structure: beam supported at its ends.
**   Test objective: section forces.
**
*NODE, NSET=Nall
       1,  0.00000e+00,  0.00000e+00,  0.00000e+00
       2,  1.00000e-01,  0.00000e+00,  0.00000e+00
       3,  5.00000e-02,  0.00000e+00,  0.00000e+00
       4,  2.00000e-01,  0.00000e+00,  0.00000e+00
       5,  1.50000e-01,  0.00000e+00,  0.00000e+00
       6,  3.00000e-01,  0.00000e+00,  0.00000e+00
       7,  2.50000e-01,  0.00000e+00,  0.00000e+00
       8,  4.00000e-01,  0.00000e+00,  0.00000e+00
       9,  3.50000e-01,  0.00000e+00,  0.00000e+00
      10,  5.00000e-01,  0.00000e+00,  0.00000e+00
      11,  4.50000e-01,  0.00000e+00,  0.00000e+00
      12,  6.00000e-01,  0.00000e+00,  0.00000e+00
      13,  5.50000e-01,  0.00000e+00,  0.00000e+00
      14,  7.00000e-01,  0.00000e+00,  0.00000e+00
      15,  6.50000e-01,  0.00000e+00,  0.00000e+00
      16,  8.00000e-01,  0.00000e+00,  0.00000e+00
      17,  7.50000e-01,  0.00000e+00,  0.00000e+00
      18,  9.00000e-01,  0.00000e+00,  0.00000e+00
      19,  8.50000e-01,  0.00000e+00,  0.00000e+00
      20,  1.00000e+00,  0.00000e+00,  0.00000e+00
      21,  9.50000e-01,  0.00000e+00,  0.00000e+00
      22,  1.10000e+00,  0.00000e+00,  0.00000e+00
      23,  1.05000e+00,  0.00000e+00,  0.00000e+00
      24,  1.20000e+00,  0.00000e+00,  0.00000e+00
      25,  1.15000e+00,  0.00000e+00,  0.00000e+00
      26,  1.30000e+00,  0.00000e+00,  0.00000e+00
      27,  1.25000e+00,  0.00000e+00,  0.00000e+00
      28,  1.40000e+00,  0.00000e+00,  0.00000e+00
      29,  1.35000e+00,  0.00000e+00,  0.00000e+00
      30,  1.50000e+00,  0.00000e+00,  0.00000e+00
      31,  1.45000e+00,  0.00000e+00,  0.00000e+00
      32,  1.60000e+00,  0.00000e+00,  0.00000e+00
      33,  1.55000e+00,  0.00000e+00,  0.00000e+00
      34,  1.70000e+00,  0.00000e+00,  0.00000e+00
      35,  1.65000e+00,  0.00000e+00,  0.00000e+00
      36,  1.80000e+00,  0.00000e+00,  0.00000e+00
      37,  1.75000e+00,  0.00000e+00,  0.00000e+00
      38,  1.90000e+00,  0.00000e+00,  0.00000e+00
      39,  1.85000e+00,  0.00000e+00,  0.00000e+00
      40,  2.00000e+00,  0.00000e+00,  0.00000e+00
      41,  1.95000e+00,  0.00000e+00,  0.00000e+00
*ELEMENT, TYPE=B32, ELSET=Eall
     1,      1,      3,      2
     2,      2,      5,      4
     3,      4,      7,      6
     4,      6,      9,      8
     5,      8,     11,     10
     6,     10,     13,     12
     7,     12,     15,     14
     8,     14,     17,     16
     9,     16,     19,     18
    10,     18,     21,     20
    11,     20,     23,     22
    12,     22,     25,     24
    13,     24,     27,     26
    14,     26,     29,     28
    15,     28,     31,     30
    16,     30,     33,     32
    17,     32,     35,     34
    18,     34,     37,     36
    19,     36,     39,     38
    20,     38,     41,     40
*BOUNDARY
1,1,3
40,2,3
1,4,4
40,4,4
*MATERIAL,NAME=EL
*ELASTIC
210000.,.3
*BEAM SECTION,ELSET=Eall,MATERIAL=EL,SECTION=RECT
0.05, 0.08
0.d0,1.d0,0.d0
*STEP,NLGEOM
*STATIC
*CLOAD
20,3,0.01
*NODE PRINT,NSET=NALL
U
*EL PRINT,ELSET=EALL
S
*NODE FILE,OUTPUT=2D
U
*EL FILE,SECTION FORCES
S,NOE
*END STEP
