**
**   Structure: disk segment
**   Test objective: mesh smoothing (= refine mesh
**                   with a high limit)
**                   (cf. segmentunsmooth.inp)
**
*HEADING
Model: segment
*Node,NSET=Nall
1, 0, 1, 0
2, 0.030974858, 1, 0
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*Element, type=C3D10, ELSET=Eall
1, 133, 37, 30, 214, 658, 640, 641,
1510, 1001, 1511
2, 252, 211, 359, 251, 1123, 1513, 1512,
1125, 1121, 1514
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*MATERIAL,NAME=EL
*ELASTIC
210000.,.3
*DENSITY
7.8E-9
*SOLID SECTION,ELSET=Eall,MATERIAL=EL
** Names based on fix
*NSET,NSET=Nfix
29,
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*BOUNDARY
Nfix,1,3
*STEP
*STATIC
*CLOAD
260,2,1.
*DLOAD
1207,P3,0.0001
*EL FILE
S
*REFINE MESH,LIMIT=10000.
S
*END STEP
