**
**   Structure: fluid flow between two plates.
**   Test objective: stationary incompressible Couette
**                   with fixed wall temperature.
**                   velocity:linear between 0. and 1.
**                   temperature: maximum of 1.125
**                   slanted mesh
**                   CBS-Method
**
*NODE, NSET=Nall
       1,0.000000000000e+00,1.000000000000e+00,1.000000000000e-01
       2,0.000000000000e+00,1.000000000000e+00,0.000000000000e+00
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*ELEMENT, TYPE=F3D8, ELSET=Eall
     1,     1,     2,     3,     4,     5,     6,     7,     8
     2,     4,     3,     9,    10,     8,     7,    11,    12
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** Names based on in
*NSET,NSET=Nin
5,
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** Names based on out
*NSET,NSET=Nout
249,
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** Names based on wall
*NSET,NSET=Nwall
61,
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** Names based on unitvel
*NSET,NSET=Nunitvel
1,
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*MATERIAL,NAME=WATER
*DENSITY
1.
*FLUID CONSTANTS
1.,1.
*CONDUCTIVITY
1.
*SOLID SECTION,ELSET=Eall,MATERIAL=WATER
*INITIAL CONDITIONS,TYPE=FLUID VELOCITY
Nall,1,0.
Nall,2,0.
Nall,3,0.
*INITIAL CONDITIONS,TYPE=PRESSURE
Nall,1.
*INITIAL CONDITIONS,TYPE=TEMPERATURE
Nall,0.
*STEP,INCF=10000
*CFD,STEADY STATE
1.,1.,,
*BOUNDARY
Nall,3,3,0.
Nwall,1,2,0.
Nunitvel,1,1,1.
Nunitvel,2,2,0.
55,1,1,0.1
56,1,1,0.1
49,1,1,0.2
50,1,1,0.2
43,1,1,0.3
44,1,1,0.3
37,1,1,0.4
38,1,1,0.4
31,1,1,0.5
32,1,1,0.5
25,1,1,0.6
26,1,1,0.6
19,1,1,0.7
20,1,1,0.7
13,1,1,0.8
14,1,1,0.8
5,1,1,0.9
6,1,1,0.9
Nin,2,2,0.
Nin,11,11,0.
Nwall,11,11,0.
Nunitvel,11,11,0.
Nout,8,8,1.
*NODE PRINT,FREQUENCYF=3000,NSET=Nall
VF,PSF,TSF
*END STEP
