*HEADING
3D submodel
*NODE, NSET=NALL
         1,  129.99398432514,  44.490304715049,  -9.37512594E-07
         2,  130.25624833542,  42.990304601888,  -8.80222604E-07
         3,  130.5185123457 ,  41.490304488727,  -8.22933606E-07
         4,  130.78077635598,  39.990304375566,  -7.65642742E-07
         5,  131.04304036626,  38.490304262404,  -7.08353747E-07
         6,  131.30530437654,  36.990304149243,  -6.51063754E-07
         7,  131.56756838682,  35.490304036082,  -5.93773889E-07
         8,  131.8298323971 ,  33.990303922921,  -5.36483896E-07
         9,  132.09209640738,  32.49030380976 ,  -4.79194029E-07
        10,  132.35436041766,  30.990303696599,  -4.21904037E-07
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*ELEMENT,TYPE=C3D15, ELSET=EALL
         3,        28,         7,         9,       150,       155,       144,        29,         8,
        31,       154,       157,       152,       151,       156,       145
        10,        44,        46,        48,       191,       194,       197,        45,        47,
        72,       193,       196,       199,       192,       195,       198
        12,        75,        48,        50,       204,       197,       208,        73,        49,
        76,       203,       207,       210,       205,       198,       209
        28,        66,       103,        64,       275,       264,       267,       104,       105,
        65,       274,       269,       278,       276,       265,       268
        36,       110,       130,       108,       306,       302,       309,       131,       134,
       109,       305,       311,       313,       307,       303,       310
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*ELEMENT,TYPE=C3D20R, ELSET=EALL
         1,        11,        13,        15,         9,       135,       138,       141,       144,
        12,        14,        30,        10,       137,       140,       143,
       146,       136,       139,       142,       145
         2,        17,        28,         9,        15,       147,       150,       144,       141,
        27,        31,        30,        16,       149,       152,       143,
       153,       148,       151,       145,       142
         4,        19,        33,        28,        17,       158,       161,       150,       147,
        32,        35,        27,        18,       160,       163,       149,
       164,       159,       162,       151,       148
         5,        33,         5,         7,        28,       161,       166,       155,       150,
        34,         6,        29,        35,       165,       168,       154,
       163,       162,       167,       156,       151
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*NSET, NSET=INTERFACE
         1,         2,         3,         4,         5,         6,         7,         8,
         9,        10,        11,        46,        47,        48,        49,        50,
        64,        65,        66,        67,        68,       106,       107,       108,
       109,       110,       111,       112,       113,       114,       115,       116,
       135,       136,       144,       145,       146,       155,       156,       157,
       166,       167,       168,       177,       178,       179,       188,       189,
       190,       194,       195,       196,       197,       198,       207,       208,
       209,       267,       268,       271,       272,       275,       276,       277,
       278,       287,       288,       289,       290,       291,       298,       299,
       300,       306,       307,       308,       309,       310,       313,       315,
       316,       317,       318,       319,       327,       328,       329,       338,
       339,       340,       349,       350,       351,       360,       361,       362,
       371,       372,       373,       377,       378,       379,       380,       381,
       390,       391,       392,       450,       451,       454,       455,       458,
       459,       460,       461,       470,       471,       472,       473,       474,
       481,       482,       483,       489,       490,       491,       492,       493,
       496,       498,       499,       500,       501,       502,       510,       511,
       512,       521,       522,       523,       532,       533,       534,       543,
       544,       545,       554,       555,       556,       560,       561,       562,
       563,       564,       573,       574,       575,       633,       634,       637,
       638,       641,       642,       643,       644,       653,       654,       655,
       656,       657,       664,       665,       666,       672,       673,       674,
       675,       676,       679,       681,       682,       683,       684,       685,
       693,       694,       695,       704,       705,       706,       715,       716,
       717,       726,       727,       728,       737,       738,       739,       743,
       744,       745,       746,       747,       756,       757,       758,       816,
       817,       820,       821,       824,       825,       826,       827,       836,
       837,       838,       839,       840,       847,       848,       849,       855,
       856,       857,       858,       859,       862,       864,       865,       866
*NSET, NSET=cyc-symm
        12,        13,        14,        15,        16,        17,        18,        19,
        20,        21,        22,        23,        24,        25,        26,        27,
        28,        29,        30,        31,        32,        33,        34,        35,
        36,        37,        38,        39,        40,        41,        42,        43,
        44,        45,        51,        52,        53,        54,        55,        56,
        57,        58,        59,        60,        61,        62,        63,        69,
        70,        71,        72,        73,        74,        75,        76,        77,
        78,        79,        80,        81,        82,        83,        84,        85,
        86,        87,        88,        89,        90,        91,        92,        93,
        94,        95,        96,        97,        98,        99,       100,       101,
       102,       103,       104,       105,       117,       118,       119,       120,
       121,       122,       123,       124,       125,       126,       127,       128,
       129,       130,       131,       132,       133,       134,       686,       687,
       689,       690,       692,       696,       698,       699,       701,       702,
       703,       707,       709,       710,       712,       713,       714,       718,
       720,       721,       723,       724,       725,       729,       731,       732,
       734,       735,       736,       740,       742,       748,       749,       751,
       752,       753,       755,       759,       760,       761,       763,       764,
       765,       766,       768,       769,       770,       772,       773,       774,
       776,       777,       778,       780,       781,       782,       784,       785,
       786,       788,       789,       790,       792,       793,       794,       796,
       797,       798,       800,       801,       802,       804,       805,       806,
       808,       809,       811,       812,       813,       815,       818,       819,
       822,       823,       828,       829,       831,       832,       834,       835,
       841,       842,       843,       845,       846,       850,       851,       853,
       854,       860,       861,       863
*MATERIAL,NAME=EL
*CONDUCTIVITY
50.,0.
*ELASTIC
210000.,.3
*EXPANSION
25.E-6
*DENSITY
7.8E-9
*SPECIFIC HEAT
446.E6
*SOLID SECTION, ELSET=EALL, MATERIAL=EL
*TRANSFORM, TYPE=C, NSET=cyc-symm
0.0, 0.0, 0.0, 0.0, 1.0, 0.0
*BOUNDARY, OP=NEW
cyc-symm, 2,, 0.0
*SUBMODEL, TYPE=NODE, INPUT=global_2D3Dcpl.frd
NALL
*INITIAL CONDITIONS, TYPE=TEMPERATURE
NALL, 293.15
*STEP, NLGEOM=YES
*STATIC
1.0, 1.0
*BOUNDARY, SUBMODEL, MASTER=2D, STEP=1
INTERFACE, 1, 3
*TEMPERATURE, SUBMODEL, MASTER=2D, STEP=1
NALL
*DLOAD, OP=NEW
EALL, CENTRIF, 1.0e+06, 0.0, 0.0, 0.0, 0.0, 1.0, 0.0
*NODE FILE
U, NT
*EL FILE
S
*END STEP
