**
**   Structure: 3d submodel subject to heat transfer
**   Test objective: temperature boundary conditions are
**                   interpolated from the 2d axisymmetric
**                   model global_2d3d_thermal.frd
**
*NODE, NSET=NALL
         1,  129.99398432514,  44.490304715049,  -9.37512594E-07
         2,  130.25624833542,  42.990304601888,  -8.80222604E-07
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*ELEMENT,TYPE=C3D15, ELSET=EALL
         3,        28,         7,         9,       150,       155,       144,        29,         8,
        31,       154,       157,       152,       151,       156,       145
        10,        44,        46,        48,       191,       194,       197,        45,        47,
        72,       193,       196,       199,       192,       195,       198
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*ELEMENT,TYPE=C3D20R, ELSET=EALL
         1,        11,        13,        15,         9,       135,       138,       141,       144,
        12,        14,        30,        10,       137,       140,       143,
       146,       136,       139,       142,       145
         2,        17,        28,         9,        15,       147,       150,       144,       141,
        27,        31,        30,        16,       149,       152,       143,
       153,       148,       151,       145,       142
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*NSET, NSET=INTERFACE
         1,         2,         3,         4,         5,         6
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*MATERIAL,NAME=EL
*CONDUCTIVITY
50.,0.
*ELASTIC
210000.,.3
*EXPANSION
25.E-6
*DENSITY
7.8E-9
*SPECIFIC HEAT
446.E6
*SOLID SECTION, ELSET=EALL, MATERIAL=EL
*SUBMODEL, TYPE=NODE, INPUT=global_2d3d_thermal.frd
INTERFACE
*STEP, NLGEOM=YES
*HEAT TRANSFER, STEADY STATE
1.0, 1.0, 1e-6, 1.0
*BOUNDARY, SUBMODEL, MASTER=2D, STEP=1
INTERFACE, 11, 11
*NODE PRINT,NSET=INTERFACE
NT
*END STEP
