=======
**
**   Structure: cantilever beam.
**   Test objective: user beam element U1
**                   mass matrix (frequency calculation)
**
*NODE, NSET=NALL
1,    0.0000000,    0.0000000,    0.0000000
2,    0.2165064,    0.1250000,    0.0000000
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*ELEMENT, TYPE=U1, ELSET=EALL
1,  1, 2
2,  2, 3
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*USER ELEMENT,TYPE=U1,NODES=2,INTEGRATION POINTS=2,MAXDOF=6
*BEAM SECTION, SECTION=GENERAL, ELSET=EALL, MATERIAL=STEEL
.50, 4.1667e-02, 0.0, 1.0417e-02, 0.833333
0.,1.,0.
*MATERIAL, NAME=STEEL
*ELASTIC
2.1e+05, 0.0
*DENSITY
7.8e-09
*BOUNDARY, OP=NEW
1, 1,6, 0.0
*STEP
*FREQUENCY
24
*END STEP
